Simulations: Version=58
  Memo Description
    ## General Description

    This is a base simulation that can be used describe multi-year rotations of crops, pasture+crops, or only pasture.  It is meant to be modified by an external tool (ApsimHandler), thence being adapted to simulate a more especific system/situation.  The modifications allowed include changing the start and end dates, location (weather data), irrigation and fertiliser management, the presence of pasture, the harvest management for pasture , and the number and type of crops.  Soil type is yet to be implemented.
    The newly created simulation is named 'ModifiedSimulation.apsimx'.
  Replacements
    Plant FieldPea: CropType=FieldPea; IsEnding=false; DaysAfterEnding=0
      Memo Memo1
        ## References

        ### **Ayaz S, McKenzie BA, McNeil DL, Hill GD.2004**. Light interception and utilization of four grain legumes sown at different plant populations and depths. _Journal of Agricultural Science,_**142**: 297-308.
         **Ayaz S, McKenzie BA, Hill GD, McNeil DL.2004**. Variability in yield of four grain legume species in a subhumid temperate environment. II. Yield components. _Journal of Agricultural Science,_**142**: 21-28.
         **Ayaz S, McKenzie BA, Hill GD, McNeil DL.2004**. Nitrogen distribution in four grain legumes. _Journal of Agricultural Science,_**142**: 309-317.
         **Wilson DR, Robertson MJ.1996.**Pea phenology responses to temperature and photoperiod. _Australian Agronomy Society_.
      OrganArbitrator Arbitrator
        RelativeAllocation NArbitrator
        RelativeAllocation DMArbitrator
      Phenology
        AirTemperatureFunction ThermalTime
          XYPairs: X=[4.5, 30, 40]; Y=[0, 25.5, 0]
        PhotoperiodFunction Photoperiod: Twilight=-6; DayLength=0
        GerminatingPhase Germinating: Start=Sowing; End=Germination
        EmergingPhase Emerging: ShootLag=15; ShootRate=5; Start=Germination; End=Emergence; TTForTimeStep=0
          VariableReference ThermalTime: VariableName=[Phenology].ThermalTime.Value()
          VariableReference ThermalTime1: VariableName=[Phenology].ThermalTime.Value()
        NodeNumberPhase Vegetative: Start=Emergence; End=StartFlowering
          LinearInterpolationFunction CompletionNodeNumber: XProperty=[Phenology].Photoperiod.Value()
            XYPairs: X=[13, 16]; Y=[18, 15]
          VariableReference ThermalTime: VariableName=[Phenology].ThermalTime.Value()
        NodeNumberPhase Flowering: Start=StartFlowering; End=EndFlowering
          AddFunction CompletionNodeNumber
            VariableReference VegetativeNodes: VariableName=[Phenology].NFF.Value()
            LinearInterpolationFunction FloweringNodes: XProperty=[Phenology].Photoperiod.Value()
              XYPairs: X=[13, 16]; Y=[10, 7]
          MultiplyFunction Target
            VariableReference NodeNumberDuration
              VariableName=[Phenology].Flowering.CompletionNodeNumber.FloweringNodes.Value()
            VariableReference Phyllochron: VariableName=[Structure].Phyllochron.Value()
          VariableReference ThermalTime: VariableName=[Phenology].ThermalTime.Value()
        GenericPhase GrainFilling: Start=EndFlowering; End=EndGrainFill
          Constant Target: FixedValue=500
          VariableReference Progression: VariableName=[Phenology].ThermalTime.Value()
        GenericPhase Maturing: Start=EndGrainFill; End=Maturity
          Constant Target: FixedValue=60
          VariableReference Progression: VariableName=[Phenology].ThermalTime.Value()
        GenericPhase Ripening: Start=Maturity; End=HarvestRipe
          Constant Target: FixedValue=1
          VariableReference Progression: VariableName=[Phenology].ThermalTime.Value()
        EndPhase ReadyForHarvesting: Start=HarvestRipe; End=Unused
          VariableReference ThermalTime: VariableName=[Phenology].ThermalTime.Value()
        OnEventFunction NFF: SetEvent=StartFlowering; ReSetEvent=never
          Constant PreEventValue: FixedValue=0
          VariableReference PostEventValue: VariableName=[Phenology].Vegetative.CompletionNodeNumber.Value()
        OnEventFunction FN: SetEvent=EndFlowering; ReSetEvent=never
          Constant PreEventValue: FixedValue=0
          SubtractFunction PostEventValue
            VariableReference PostEventValue: VariableName=[Structure].LeafTipsAppeared
            VariableReference PostEventValue1: VariableName=[Phenology].NFF.Value()
      Structure: CohortInitialisationStage=Germination; LeafInitialisationStage=Emergence
        VariableReference ThermalTime: VariableName=[Phenology].ThermalTime.Value()
        Constant DroughtInducedBranchMortality: FixedValue=0
        Constant FinalLeafNumber: FixedValue=40
        LinearInterpolationFunction HeightModel: XProperty=[Stem].Live.Wt
          XYPairs: X=[0, 300]; Y=[10, 750]
        MultiplyFunction BranchingRate
          LinearInterpolationFunction Potential_Branching_Rate: XProperty=[Structure].LeafTipsAppeared
            XYPairs: X=[0, 4, 5, 7, 8]; Y=[0, 0, 1, 1, 0]
          LinearInterpolationFunction Cover_response: XProperty=[leaf].CoverGreen
            XYPairs: X=[0, 0.17, 0.25]; Y=[1, 1, 0]
          LinearInterpolationFunction CHO_response: XProperty=[Stem].Live.StorageWt
            XYPairs: X=[0, 1, 10]; Y=[1, 1, 1]
        Constant BranchMortality: FixedValue=0
        PhaseLookup Phyllochron
          PhaseLookupValue Vegetative: Start=Emergence; End=StartFlowering
            Constant Function: FixedValue=30
          PhaseLookupValue Flowering: Start=StartFlowering; End=EndFlowering
            Constant Function: FixedValue=40
        Constant StemSenescenceAge: FixedValue=0
      ReproductiveOrgan Grain: GrowthRespiration=0; MaintenanceRespiration=0
        Biomass Live: DMDOfStructural=0.6
        Biomass Dead: DMDOfStructural=0.6
        Constant MaximumPotentialGrainSize: FixedValue=0.4
        PhaseLookup DMDemandFunction
          PhaseLookupValue GrainFilling: Start=StartFlowering; End=EndGrainFill
            FillingRateFunction
              VariableReference NumberFunction: VariableName=[Grain].NumberFunction.Value()
              AddFunction FillingDuration
                VariableReference FillingDuration: VariableName=[Phenology].GrainFilling.Target.Value()
                VariableReference FillingDuration1: VariableName=[Phenology].GrainFilling.Target.Value()
              VariableReference ThermalTime: VariableName=[Phenology].ThermalTime.Value()
              VariableReference PotentialSizeIncrement: VariableName=[Grain].MaximumPotentialGrainSize.Value()
        Constant MinimumNConc: FixedValue=0.02
        Constant MaximumNConc: FixedValue=0.03
        Constant WaterContent: FixedValue=0.12
        PhaseLookup NFillingRate
          PhaseLookupValue GrainFilling: Start=StartFlowering; End=EndGrainFill
            FillingRateFunction
              VariableReference NumberFunction: VariableName=[Grain].NumberFunction.Value()
              AddFunction FillingDuration
                VariableReference FillingDuration: VariableName=[Phenology].Flowering.Target.Value()
                VariableReference FillingDuration1: VariableName=[Phenology].GrainFilling.Target.Value()
              VariableReference ThermalTime: VariableName=[Phenology].ThermalTime.Value()
              MultiplyFunction PotentialSizeIncrement
                Constant MaximumFinalNConc: FixedValue=0.04
                VariableReference MaximumSize: VariableName=[Grain].MaximumPotentialGrainSize.Value()
        MultiplyFunction NumberFunction
          Constant PeasPerPod: FixedValue=3
          VariableReference PodNumber: VariableName=[Shell].PodNumber.Value()
        BiomassRemoval BiomassRemovalDefaults
          OrganBiomassRemovalType Harvest: FractionLiveToRemove=1; FractionDeadToRemove=0; FractionLiveToResidue=0; FractionDeadToResidue=0
          OrganBiomassRemovalType Cut: FractionLiveToRemove=1; FractionDeadToRemove=0; FractionLiveToResidue=0; FractionDeadToResidue=0
          OrganBiomassRemovalType Prune: FractionLiveToRemove=0; FractionDeadToRemove=0; FractionLiveToResidue=0.8; FractionDeadToResidue=0
          OrganBiomassRemovalType Graze: FractionLiveToRemove=0.6; FractionDeadToRemove=0; FractionLiveToResidue=0.2; FractionDeadToResidue=0
        Constant DMConversionEfficiency: FixedValue=1
        Constant RemobilisationCost: FixedValue=0
        Constant CarbonConcentration: FixedValue=0.4
      Root: GrowthRespiration=0; MaintenanceRespiration=0; RootAngle=45; SWAvailabilityRatio=0
        LinearInterpolationFunction KLModifier: XProperty=[Leaf].LAI
          XYPairs: X=[0, 3]; Y=[1, 1]
        AirTemperatureFunction TemperatureEffect
          XYPairs: X=[0, 26, 35]; Y=[1, 1, 1]
        Constant MaxDailyNUptake: FixedValue=6
        Constant SenescenceRate: FixedValue=0
        Constant MaximumRootDepth: FixedValue=1000000
        PhaseLookup RootFrontVelocity
          PhaseLookupValue PreEmergence: Start=Germination; End=Emergence
            Constant Function: FixedValue=3
          PhaseLookupValue early: Start=Emergence; End=StartFlowering
            Constant Function: FixedValue=15
          PhaseLookupValue late: Start=StartFlowering; End=Maturity
            Constant Function: FixedValue=17
        Constant MaximumNConc: FixedValue=0.01
        Constant MinimumNConc: FixedValue=0.005
        PhaseBasedSwitch NitrogenDemandSwitch: Start=Emergence; End=EndGrainFill
        LinearInterpolationFunction KNO3: XProperty=[Root].LengthDensity
          XYPairs: X=[0, 0.003]; Y=[0.02, 0.02]
        LinearInterpolationFunction KNH4: XProperty=[Root].LengthDensity
          XYPairs: X=[0, 0.003]; Y=[0, 0]
        BiomassRemoval BiomassRemovalDefaults
          OrganBiomassRemovalType Harvest: FractionLiveToRemove=0; FractionDeadToRemove=0; FractionLiveToResidue=0.2; FractionDeadToResidue=0
          OrganBiomassRemovalType Cut: FractionLiveToRemove=0; FractionDeadToRemove=0; FractionLiveToResidue=0.3; FractionDeadToResidue=0
          OrganBiomassRemovalType Prune: FractionLiveToRemove=0; FractionDeadToRemove=0; FractionLiveToResidue=0.1; FractionDeadToResidue=0
          OrganBiomassRemovalType Graze: FractionLiveToRemove=0; FractionDeadToRemove=0; FractionLiveToResidue=0.15; FractionDeadToResidue=0
        LinearInterpolationFunction NUptakeSWFactor: XProperty=[Root].RWC
          XYPairs: X=[0, 1]; Y=[0, 1]
        Constant InitialDM: FixedValue=0.2; Units=g/plant
        Constant SpecificRootLength: FixedValue=40; Units=m/g
        Constant DMConversionEfficiency: FixedValue=1
        Constant MaintenanceRespirationFunction: FixedValue=1
        Constant RemobilisationCost: FixedValue=0
        Constant CarbonConcentration: FixedValue=0.4
        BiomassDemand DMDemands
          MultiplyFunction Structural
            PartitionFractionDemandFunction DMDemandFunction
              PhaseLookup PartitionFraction
                PhaseLookupValue Early: Start=Emergence; End=StartFlowering
                  Constant Function: FixedValue=0.1
                PhaseLookupValue Middle: Start=StartFlowering; End=EndFlowering
                  Constant Function: FixedValue=0.08
                PhaseLookupValue Late: Start=EndFlowering; End=Maturity
                  Constant Function: FixedValue=0
            Constant StructuralFraction: FixedValue=1
          Constant Metabolic: FixedValue=0
          StorageDMDemandFunction Storage
            SubtractFunction StorageFraction
              Constant One: FixedValue=1
              VariableReference StructuralFraction: VariableName=[Root].DMDemands.Structural.StructuralFraction.Value()
        BiomassDemand NDemands
          MultiplyFunction Structural
            VariableReference MinNconc: VariableName=[Root].minimumNconc.Value()
            VariableReference PotentialDMAllocation: VariableName=[Root].potentialDMAllocation.Structural
          MultiplyFunction Metabolic
            SubtractFunction MetabolicNconc
              VariableReference CritNconc: VariableName=[Root].criticalNConc.Value()
              VariableReference MinNconc: VariableName=[Root].minimumNconc.Value()
            VariableReference PotentialDMAllocation: VariableName=[Root].potentialDMAllocation.Structural
          StorageNDemandFunction Storage
            VariableReference NitrogenDemandSwitch: VariableName=[Root].nitrogenDemandSwitch.Value()
            VariableReference MaxNconc: VariableName=[Root].maximumNconc.Value()
      Nodule
        Constant FixationMetabolicCost: FixedValue=7
        Constant MaximumNConc: FixedValue=0.02
        Constant MinimumNConc: FixedValue=0.01
        Constant SenescenceRate: FixedValue=0
        Constant NReallocationFactor: FixedValue=0
        PhaseBasedSwitch NitrogenDemandSwitch: Start=Emergence; End=EndGrainFill
        BiomassRemoval BiomassRemovalDefaults
          OrganBiomassRemovalType Harvest: FractionLiveToRemove=0.5; FractionDeadToRemove=0; FractionLiveToResidue=0.1; FractionDeadToResidue=0
          OrganBiomassRemovalType Cut: FractionLiveToRemove=0.8; FractionDeadToRemove=0; FractionLiveToResidue=0; FractionDeadToResidue=0
          OrganBiomassRemovalType Prune: FractionLiveToRemove=0; FractionDeadToRemove=0; FractionLiveToResidue=0.6; FractionDeadToResidue=0
          OrganBiomassRemovalType Graze: FractionLiveToRemove=0.6; FractionDeadToRemove=0; FractionLiveToResidue=0.2; FractionDeadToResidue=0
        Constant InitialWtFunction: FixedValue=0; Units=g/m^2
        Constant DetachmentRateFunction: FixedValue=0; Units=/d
        MultiplyFunction FixationRate
          VariableReference NoduleWt: VariableName=[Nodule].Live.Wt
          Constant SpecificNitrogenaseActivity: FixedValue=0
          MinimumFunction
            AirTemperatureFunction FT
              XYPairs: X=[0, 20, 30, 40]; Y=[0, 1, 1, 0]
            LinearInterpolationFunction FW: XProperty=[Leaf].Fw
              XYPairs: X=[0, 1, 1.5]; Y=[0, 1, 1]
            LinearInterpolationFunction FWlog: XProperty=[Leaf].Fw
              XYPairs: X=[0, 1, 1.5]; Y=[1, 1, 1]
        Constant MaintenanceRespirationFunction: FixedValue=0; Units=0-1
        Constant DMConversionEfficiency: FixedValue=1; Units=0-1
        Constant NRetranslocationFactor: FixedValue=0
        Constant DMReallocationFactor: FixedValue=0
        Constant DMRetranslocationFactor: FixedValue=0
        VariableReference CriticalNConc: VariableName=[Nodule].MinimumNConc.Value()
        Constant RemobilisationCost: FixedValue=0
        Constant CarbonConcentration: FixedValue=0.4
        BiomassDemand DMDemands
          MultiplyFunction Structural
            PartitionFractionDemandFunction DMDemandFunction
              PhaseLookup PartitionFraction
                PhaseLookupValue Early: Start=Emergence; End=StartFlowering
                  Constant Function: FixedValue=0.03
                PhaseLookupValue Middle: Start=StartFlowering; End=EndFlowering
                  Constant Function: FixedValue=0.02
                PhaseLookupValue Late: Start=EndFlowering; End=Maturity
                  Constant Function: FixedValue=0
            Constant StructuralFraction: FixedValue=1; Units=g/g
          Constant Metabolic: FixedValue=0
          StorageDMDemandFunction Storage
            SubtractFunction StorageFraction
              Constant One: FixedValue=1
              VariableReference StructuralFraction: VariableName=[Nodule].DMDemands.Structural.StructuralFraction.Value()
        BiomassDemand NDemands
          MultiplyFunction Structural
            VariableReference MinNconc: VariableName=[Nodule].minimumNconc.Value()
            VariableReference PotentialDMAllocation: VariableName=[Nodule].potentialDMAllocation.Structural
          MultiplyFunction Metabolic
            SubtractFunction MetabolicNconc
              VariableReference CritNconc: VariableName=[Nodule].criticalNConc.Value()
              VariableReference MinNconc: VariableName=[Nodule].minimumNconc.Value()
            VariableReference PotentialDMAllocation: VariableName=[Nodule].potentialDMAllocation.Structural
          StorageNDemandFunction Storage
            VariableReference NitrogenDemandSwitch: VariableName=[Nodule].nitrogenDemandSwitch.Value()
            VariableReference MaxNconc: VariableName=[Nodule].maximumNconc.Value()
      GenericOrgan Shell
        Constant NReallocationFactor: FixedValue=0
        Constant NRetranslocationFactor: FixedValue=0.1
        Constant MaximumNConc: FixedValue=0.03
        Constant MinimumNConc: FixedValue=0.01
        Constant DMRetranslocationFactor: FixedValue=0.1
        PhaseBasedSwitch NitrogenDemandSwitch: Start=Germination; End=Maturity
        MultiplyFunction PodNumber
          Constant PodsPerNode: FixedValue=1
          VariableReference StemPopulation: VariableName=[Structure].TotalStemPopn
          PhaseLookupValue FloweringNodes: Start=StartFlowering; End=HarvestRipe
            SubtractFunction FloweringNodes
              VariableReference TotalNodes: VariableName=[Structure].LeafTipsAppeared
              VariableReference VegetativeNodes: VariableName=[Phenology].NFF.Value()
        BiomassRemoval BiomassRemovalDefaults: same as Replacements.FieldPea.Nodule.BiomassRemovalDefaults
        Constant InitialWtFunction: FixedValue=0; Units=g/m^2
        Constant SenescenceRate: FixedValue=0; Units=/d
        Constant DetachmentRateFunction: FixedValue=0; Units=/d
        Constant MaintenanceRespirationFunction: FixedValue=0; Units=0-1
        Constant DMConversionEfficiency: FixedValue=1; Units=0-1
        Constant DMReallocationFactor: FixedValue=0
        VariableReference CriticalNConc: VariableName=[Shell].MinimumNConc.Value()
        Constant RemobilisationCost: FixedValue=0
        Constant CarbonConcentration: FixedValue=0.4
        BiomassDemand DMDemands
          MultiplyFunction Structural
            PopulationBasedDemandFunction DMDemandFunction
              VariableReference ThermalTime: VariableName=[Phenology].ThermalTime.Value()
              VariableReference OrganPopulation: VariableName=[Shell].PodNumber.Value()
              Constant ExpansionStress: FixedValue=1
              AddFunction GrowthDuration
                VariableReference FloweringGrowthPeriod: VariableName=[Phenology].Flowering.Target.Value()
                Constant PostFloweringGrowthPeriod: FixedValue=60
              Constant StartStage: FixedValue=4
              Constant MaximumOrganWt: FixedValue=0.5
            Constant StructuralFraction: FixedValue=0.7
          Constant Metabolic: FixedValue=0
          StorageDMDemandFunction Storage
            SubtractFunction StorageFraction
              Constant One: FixedValue=1
              VariableReference StructuralFraction: VariableName=[Shell].DMDemands.Structural.StructuralFraction.Value()
        BiomassDemand NDemands
          MultiplyFunction Structural
            VariableReference MinNconc: VariableName=[Shell].minimumNconc.Value()
            VariableReference PotentialDMAllocation: VariableName=[Shell].potentialDMAllocation.Structural
          MultiplyFunction Metabolic
            SubtractFunction MetabolicNconc
              VariableReference CritNconc: VariableName=[Shell].criticalNConc.Value()
              VariableReference MinNconc: VariableName=[Shell].minimumNconc.Value()
            VariableReference PotentialDMAllocation: VariableName=[Shell].potentialDMAllocation.Structural
          StorageNDemandFunction Storage
            VariableReference NitrogenDemandSwitch: VariableName=[Shell].nitrogenDemandSwitch.Value()
            VariableReference MaxNconc: VariableName=[Shell].maximumNconc.Value()
        RetranslocateNonStructural RetranslocateNitrogen
      Leaf: MaxCover=1; R50=200; MicroClimatePresent=true; KDead=0.3; MaximumMainStemLeafNumber=40
        zero: CurrentExpandingLeaf, StartFractionExpanded, FractionNextleafExpanded, DeadNodesYesterday, GrowthRespiration, Albedo, Gsmax350, FRGR, PotentialEP, WaterDemand, TipsAtEmergence, CohortsAtInitialisation, FractionDied
        LeafCohort InitialLeaf1: Rank=1; Area=100
          zero: NReallocationFactor, DMReallocationFactor, NRetranslocationFactor, DMRetranslocationFactor, ShadeInducedSenRate, SenescedFrac, DeltaPotentialArea, DeltaStressConstrainedArea, DeltaCarbonConstrainedArea, PotentialStructuralDMAllocation, PotentialMetabolicDMAllocation, MetabolicNReallocated, MetabolicWtReallocated, StorageNReallocated, StorageWtReallocated, MetabolicNRetranslocated, StorageNRetrasnlocated, DMRetranslocated, MetabolicNAllocation, StructuralDMAllocation, MetabolicDMAllocation, MaintenanceRespiration
        LeafCohort InitialLeaf2: Rank=2
          zero: NReallocationFactor, DMReallocationFactor, NRetranslocationFactor, DMRetranslocationFactor, ShadeInducedSenRate, SenescedFrac, DeltaPotentialArea, DeltaStressConstrainedArea, DeltaCarbonConstrainedArea, PotentialStructuralDMAllocation, PotentialMetabolicDMAllocation, MetabolicNReallocated, MetabolicWtReallocated, StorageNReallocated, StorageWtReallocated, MetabolicNRetranslocated, StorageNRetrasnlocated, DMRetranslocated, MetabolicNAllocation, StructuralDMAllocation, MetabolicDMAllocation, Area, MaintenanceRespiration
        VariableReference ThermalTime: VariableName=[Phenology].ThermalTime.Value()
        LeafCohortParameters: ExpansionStressValue=0
          Constant SenessingLeafRelativeSize: FixedValue=1; Units=0-1
          LinearInterpolationFunction GrowthDuration: XProperty=[Phenology].Stage
            XYPairs: X=[1, 4.5, 6]; Y=[90, 90, 40]
          LinearInterpolationFunction MaxArea: XProperty=[Phenology].Stage
            XYPairs: X=[1, 2, 3, 4, 5, 6, 7, 8]; Y=[0, 1000, 2000, 3000, 4000, 2000, 0, 0]
          LinearInterpolationFunction LagDuration: XProperty=[Phenology].Stage
            XYPairs: X=[1, 4.5, 4.75, 5, 6]; Y=[400, 400, 200, 100, 50]
          LinearInterpolationFunction SenescenceDuration: XProperty=[Phenology].Stage
            XYPairs: X=[1, 5, 5.5, 6]; Y=[80, 80, 40, 10]
          Constant DetachmentLagDuration: FixedValue=1000000
          Constant DetachmentDuration: FixedValue=1000000
          LinearInterpolationFunction SpecificLeafAreaMax: XProperty=[Leaf].LAI
            XYPairs: X=[0, 4, 6, 8]; Y=[90000, 40000, 40000, 40000]
          Constant StructuralFraction: FixedValue=0.5
          LinearInterpolationFunction SpecificLeafAreaMin: XProperty=[Leaf].LAI
            XYPairs: X=[0, 4, 6, 8]; Y=[45000, 20000, 20000, 20000]
          LinearInterpolationFunction ExpansionStress: XProperty=[FieldPea].Leaf.Fw
            XYPairs: X=[0, 1]; Y=[0, 1]
          Constant MinimumNConc: FixedValue=0.03
          Constant CriticalNConc: FixedValue=0.05
          Constant MaximumNConc: FixedValue=0.08
          Constant NReallocationFactor: FixedValue=1
          Constant NRetranslocationFactor: FixedValue=0
          Constant DMRetranslocationFactor: FixedValue=0.5
          LinearInterpolationFunction ShadeInducedSenescenceRate: XProperty=[Leaf].CohortCurrentRankCoverAbove
            XYPairs: X=[0, 0.9, 0.90001]; Y=[0, 0, 0]
          Constant InitialNConc: FixedValue=0
          Constant StorageFraction: FixedValue=0
          Constant DMReallocationFactor: FixedValue=0
          Constant LeafSizeShapeParameter: FixedValue=0.01
          Constant MaintenanceRespirationFunction: FixedValue=0
          Constant DroughtInducedSenAcceleration: FixedValue=1
          Constant CellDivisionStress: FixedValue=1; Units=0-1
          Constant CellDivisionStress1: FixedValue=1; Units=0-1
          Constant CellDivisionStress2: FixedValue=1; Units=0-1
          Constant CellDivisionStress3: FixedValue=1; Units=0-1
          Constant CellDivisionStress4: FixedValue=1; Units=0-1
          Constant DroughtInducedLagAcceleration: FixedValue=1
          ArrayFunction LagDurationAgeMultiplier: Values=1 1 1
          ArrayFunction SenescenceDurationAgeMultiplier: Values=1 1 1
          ArrayFunction LeafSizeAgeMultiplier: Values=1 1 1 1 1 1 1 1 1 1 1 1
          Constant RemobilisationCost: FixedValue=0
          Constant CarbonConcentration: FixedValue=0.4
        LinearInterpolationFunction ExtinctionCoeff: XProperty=[Leaf].LAI
          XYPairs: X=[0, 0.5]; Y=[0.7, 0.7]
        RUEModel Photosynthesis
          Constant RUE: FixedValue=1
          WeightedTemperatureFunction FT: MaximumTemperatureWeighting=0.5
            XYPairs: X=[0, 15, 30, 40]; Y=[0, 1, 1, 0]
          LinearInterpolationFunction FVPD: XProperty=[Leaf].Photosynthesis.VPD
            XYPairs: X=[0, 10, 50]; Y=[1, 1, 1]
          LinearInterpolationFunction FN: XProperty=[Leaf].Fn
            XYPairs: X=[0, 1, 1.5]; Y=[1, 1, 1]
          LinearInterpolationFunction FW: XProperty=[Leaf].Fw
            XYPairs: X=[0, 1, 1.5]; Y=[1, 1, 1]
          RUECO2Function FCO2: PhotosyntheticPathway=C3
          Memo
            Ayaz eta 2004 presented a RUE of 1.6 g/MJ PAR during non-limiting temperature conditions for field pea.  Halving this to make it total radiation gives 0.8 g/MJ and adding 20% to account for root and  nodule production and N fixiation costs gives 1.0 g/MJ
          VariableReference RadnInt: VariableName=[Leaf].RadIntTot
        MinimumFunction FRGRFunction
          VariableReference RUE_FT: VariableName=[Leaf].Photosynthesis.FT.Value()
          MinimumFunction Others
            VariableReference RUE_FN: VariableName=[Leaf].Photosynthesis.FN.Value()
            VariableReference RUE_FVPD: VariableName=[Leaf].Photosynthesis.FVPD.Value()
        LinearInterpolationFunction FrostFraction: XProperty=[Weather].MinT
          XYPairs: X=[-1, 0]; Y=[0, 0]
        BiomassRemoval BiomassRemovalDefaults
          OrganBiomassRemovalType Harvest: FractionLiveToRemove=0; FractionDeadToRemove=0; FractionLiveToResidue=0.3; FractionDeadToResidue=0
          OrganBiomassRemovalType Cut: FractionLiveToRemove=0.8; FractionDeadToRemove=0; FractionLiveToResidue=0; FractionDeadToResidue=0
          OrganBiomassRemovalType Prune: FractionLiveToRemove=0; FractionDeadToRemove=0; FractionLiveToResidue=0.6; FractionDeadToResidue=0
          OrganBiomassRemovalType Graze: FractionLiveToRemove=0.6; FractionDeadToRemove=0; FractionLiveToResidue=0.1; FractionDeadToResidue=0
        Constant StructuralFraction: FixedValue=0.5
        Constant DMConversionEfficiency: FixedValue=1
        Constant RemobilisationCost: FixedValue=0
        Constant CarbonConcentration: FixedValue=0.4
        Constant StomatalConductanceCO2Modifier: FixedValue=1
      GenericOrgan Stem
        Constant NReallocationFactor: FixedValue=0
        Constant NRetranslocationFactor: FixedValue=0.1
        Constant DMRetranslocationFactor: FixedValue=0.1
        Constant MaximumNConc: FixedValue=0.03
        Constant MinimumNConc: FixedValue=0.01
        PhaseBasedSwitch NitrogenDemandSwitch: Start=Emergence; End=EndGrainFill
        BiomassRemoval BiomassRemovalDefaults: same as Replacements.FieldPea.Nodule.BiomassRemovalDefaults
        Constant InitialWtFunction: FixedValue=0; Units=g/m^2
        Constant SenescenceRate: FixedValue=0; Units=/d
        Constant DetachmentRateFunction: FixedValue=0; Units=/d
        Constant MaintenanceRespirationFunction: FixedValue=0; Units=0-1
        Constant DMConversionEfficiency: FixedValue=1; Units=0-1
        Constant DMReallocationFactor: FixedValue=0
        VariableReference CriticalNConc: VariableName=[Stem].MinimumNConc.Value()
        Constant RemobilisationCost: FixedValue=0
        Constant CarbonConcentration: FixedValue=0.4
        BiomassDemand DMDemands
          MultiplyFunction Structural
            InternodeDemandFunction DMDemandFunction
              Constant InterNodeWt: FixedValue=0.1
            Constant StructuralFraction: FixedValue=0.7
          Constant Metabolic: FixedValue=0
          StorageDMDemandFunction Storage
            SubtractFunction StorageFraction
              Constant One: FixedValue=1
              VariableReference StructuralFraction: VariableName=[Stem].DMDemands.Structural.StructuralFraction.Value()
        BiomassDemand NDemands
          MultiplyFunction Structural
            VariableReference MinNconc: VariableName=[Stem].minimumNconc.Value()
            VariableReference PotentialDMAllocation: VariableName=[Stem].potentialDMAllocation.Structural
          MultiplyFunction Metabolic
            SubtractFunction MetabolicNconc
              VariableReference CritNconc: VariableName=[Stem].criticalNConc.Value()
              VariableReference MinNconc: VariableName=[Stem].minimumNconc.Value()
            VariableReference PotentialDMAllocation: VariableName=[Stem].potentialDMAllocation.Structural
          StorageNDemandFunction Storage
            VariableReference NitrogenDemandSwitch: VariableName=[Stem].nitrogenDemandSwitch.Value()
            VariableReference MaxNconc: VariableName=[Stem].maximumNconc.Value()
        EnergyBalance: Albedo=0; Gsmax350=0; R50=0; KDead=0; LAIDead=0
          MinimumFunction FRGRFunction
            VariableReference RUE_FT: VariableName=[Stem].Photosynthesis.FT.Value()
            MinimumFunction Others
              VariableReference RUE_FN: VariableName=[Stem].Photosynthesis.FN.Value()
              VariableReference RUE_FVPD: VariableName=[Stem].Photosynthesis.FVPD.Value()
          Constant StomatalConductanceCO2Modifier: FixedValue=1
          VariableReference HeightFunction: VariableName=[Structuture].Height
          VariableReference DepthFunction: VariableName=[Structuture].Height
          Constant GAIDeadFunction: FixedValue=1
          MultiplyFunction GAIFunction
            Constant VolumeToArea: FixedValue=1.5
            DivideFunction Volume
              VariableReference Wt: VariableName=[Stem].Wt
              Constant Density: FixedValue=10000; Units=g/l
          Constant ExtinctionCoefficientFunction: FixedValue=1.5
        RUEModel Photosynthesis: same as Replacements.FieldPea.Leaf.Photosynthesis
        RetranslocateNonStructural RetranslocateNitrogen
      CompositeBiomass AboveGround: DMDOfStructural=0.6
        Propertys=[[Leaf].Live, [Leaf].Dead, [Stem].Live, [Stem].Dead, [Grain].Live, [Grain].Dead, [Shell].Live, [Shell].Dead]
      CompositeBiomass BelowGround: Propertys=[[Root].Live, [Root].Dead, [Nodule].Live, [Nodule].Dead]; DMDOfStructural=0.6
      CompositeBiomass Total: DMDOfStructural=0.6
        Propertys=[[Leaf].Live, [Leaf].Dead, [Stem].Live, [Stem].Dead, [Grain].Live, [Grain].Dead, [Shell].Live, [Shell].Dead, [Root].Live, [Root].Dead, [Nodule].Live, [Nodule].Dead]
      CompositeBiomass TotalLive: DMDOfStructural=0.6
        Propertys=[[Leaf].Live, [Stem].Live, [Grain].Live, [Shell].Live, [Root].Live, [Nodule].Live]
      CompositeBiomass TotalDead: DMDOfStructural=0.6
        Propertys=[[Leaf].Dead, [Stem].Dead, [Grain].Dead, [Shell].Dead, [Root].Dead, [Nodule].Dead]
      CompositeBiomass Pod: Propertys=[[Shell].Live, [Shell].Dead, [Grain].Live, [Grain].Dead]; DMDOfStructural=0.6
      Cultivar Primo
      Cultivar Rex
      Cultivar Excel
      Cultivar Kaspa
      Cultivar Mutka
      Cultivar Parafield
      Cultivar Parv
      Cultivar Crusader
      Cultivar Massey
        Command:
          [Phenology].Vegetative.CompletionNodeNumber.XYPairs.X = 13,16
          [Phenology].Vegetative.CompletionNodeNumber.XYPairs.Y = 8.2, 7.5
          [Phenology].Flowering.CompletionNodeNumber.FloweringNodes.XYPairs.X = 14,16
          [Phenology].Flowering.CompletionNodeNumber.FloweringNodes.XYPairs.Y = 6.5, 4
      Cultivar Patea
        Command:
          [Phenology].Vegetative.CompletionNodeNumber.XYPairs.X = 12,16
          [Phenology].Vegetative.CompletionNodeNumber.XYPairs.Y = 12,10.9
          [Phenology].Flowering.CompletionNodeNumber.FloweringNodes.XYPairs.X = 14,16
          [Phenology].Flowering.CompletionNodeNumber.FloweringNodes.XYPairs.Y = 6,4
      Cultivar Trounce
        Command:
          [Phenology].Vegetative.CompletionNodeNumber.XYPairs.X = 12,16
          [Phenology].Vegetative.CompletionNodeNumber.XYPairs.Y = 13.7,12
          [Phenology].Flowering.CompletionNodeNumber.FloweringNodes.XYPairs.X = 14,16
          [Phenology].Flowering.CompletionNodeNumber.FloweringNodes.XYPairs.Y = 6,3
      Cultivar Rovar
        Command:
          [Phenology].Vegetative.CompletionNodeNumber.XYPairs.X = 12,16
          [Phenology].Vegetative.CompletionNodeNumber.XYPairs.Y = 13.7,12
          [Phenology].Flowering.CompletionNodeNumber.FloweringNodes.XYPairs.X = 14,16
          [Phenology].Flowering.CompletionNodeNumber.FloweringNodes.XYPairs.Y = 5,5
      Cultivar Whero
        Command:
          [Phenology].Vegetative.CompletionNodeNumber.XYPairs.X = 12,16
          [Phenology].Vegetative.CompletionNodeNumber.XYPairs.Y = 18,18
          [Phenology].Flowering.CompletionNodeNumber.FloweringNodes.XYPairs.X = 13,16
          [Phenology].Flowering.CompletionNodeNumber.FloweringNodes.XYPairs.Y = 4,4
      Memo
        ## References

        ### **Ayaz S, McKenzie BA, McNeil DL, Hill GD.** **2004**. Light interception and utilization of four grain legumes sown at different plant populations and depths. _Journal of Agricultural Science,_ **142**: 297-308.
         **Ayaz S, McKenzie BA, Hill GD, McNeil DL.** **2004**. Variability in yield of four grain legume species in a subhumid temperate environment. II. Yield components. _Journal of Agricultural Science,_ **142**: 21-28.
         **Ayaz S, McKenzie BA, Hill GD, McNeil DL.** **2004**. Nitrogen distribution in four grain legumes. _Journal of Agricultural Science,_ **142**: 309-317.
         **Wilson DR, Robertson MJ.** **1996.** Pea phenology responses to temperature and photoperiod. _Australian Agronomy Society_.
      Cultivar A_green
        Command:
          [Stem].DMDemands.Structural.DMDemandFunction.InterNodeWt.FixedValue = 0.25
          [Phenology].GrainFilling.Target.FixedValue = 750
      Cultivar B_yellow
        Command:
          [Stem].DMDemands.Structural.DMDemandFunction.InterNodeWt.FixedValue = 0.2
          [Phenology].GrainFilling.Target.FixedValue = 1000
  DataStore
  Simulation BaseSimulation
    Clock: StartDate=1985-03-01; EndDate=1995-03-31
    Weather
      FileName=\\Lin-file\home$\HRARXC\My Documents\RCichota\Projects\InteroperableModels\GitHub\Simulations\WeatherData.met
    Summary SummaryFile
    SoilArbitrator
    Zone Field: Area=1; Slope=0
      Folder ManagerFolder
        Manager RotationManager
          RotationHasPasture = False
          CropList = SpringBarley,AutumnWheat,AutumnWheat,AutumnBarley,AutumnOatsChop
          RotationLength = 10
          YearToKillOffPasture = 1
          SeasonToKillPasture = Spring
          SeasonToResowPasture = Spring
```csharp
using System;
using Models.Core;
using System.Collections.Generic;
using System.Xml.Serialization;
using APSIM.Shared.Utilities;
using Models.Soils;
using Models.PMF;

namespace Models
{
    [Serializable] 
    [System.Xml.Serialization.XmlInclude(typeof(Model))]
    public class Script : Model
    {
        //Links to other Apsim modules
        [Link] private Clock Clock;
        [Link] private Zone myZone;
        [Link] private Irrigation Irrigation;
        [Link] private AgPasture.Sward Pasture;
        [Link] private ISummary mySummary = null;

        //User inputs from properties tab
        [Separator("Basic parameters for managing the pasture-crop rotations")]
        [Description(" Is pasture part of rotation?")]
        public bool RotationHasPasture { get; set; }
        [Description(" List of crops in the rotation (separated by comma): ")]
        public string[] CropList { get; set; }

        [Separator("Parameters to be used if pasture is included in the rotation")]
        [Description(" Number of years for the pasture-crop rotation")]
        public int RotationLength { get; set; }
        [Description(" Year within the rotation to kill off the pasture")]
        public int YearToKillOffPasture { get; set; }
        [Description(" Pasture is killed off in Spring or Summer?")]
        public string SeasonToKillPasture { get; set; }
        [Description(" Pasture is re-sown in Spring or Autumn?")]
        public string SeasonToResowPasture { get; set; }

        //Manager outputs
        [XmlIgnore] public string CurrentCrop { get; set; }
        [XmlIgnore] public int CurrentRotationYear { get; set; }
        [XmlIgnore] public int CurrentCropIndex { get; set; }

        //Internal variables
        private List<CropsInfo> cropsAvailable = new List<CropsInfo>(); 						// list of crops, and basic parameters, available to simulate
        private List<CropsInfo> cropsInRotation = new List<CropsInfo>(); 						// list of crops to be used in the rotation
        private Dictionary<string,string> pastureSowingDates = new Dictionary<string,string>();	// list of dates for re-sowing pasture, according to season
        private Dictionary<string,string> pastureKillOffDates= new Dictionary<string,string>();	// list of dates for killing off pasture, according to season
        private string dateSown;				// date a crop is sown
        private string cropHarvested;			// crop that is harvested
        private string dateHarvested;			// date a crop is harvested (or pasture killed)
        private int daysAfterSowing;
        private int currentYear;
        private int croppingLength;				// number of crops in the rotation

        [EventSubscribe("Commencing")]
        private void OnSimulationCommencing(object sender, EventArgs e)
        {
        	// set up the arrays with crops available to simulate and their basic management options
            cropsAvailable.Add(new CropsInfo(CropName:"AutumnWheat", SowingDate:"20-Mar", HarvestingDate:"10-Mar"));
            cropsAvailable.Add(new CropsInfo(CropName:"SpringWheat", SowingDate:"10-Sep", HarvestingDate:"10-Mar"));
            cropsAvailable.Add(new CropsInfo(CropName:"AutumnBarley", SowingDate:"01-Apr", HarvestingDate:"16-Feb"));
            cropsAvailable.Add(new CropsInfo(CropName:"SpringBarley", SowingDate:"15-Oct", HarvestingDate:"10-Mar"));
            cropsAvailable.Add(new CropsInfo(CropName:"AutumnBarleyChop", SowingDate:"01-Apr", HarvestingDate:"11-Dec"));
            cropsAvailable.Add(new CropsInfo(CropName:"SummerBarleyChop", SowingDate:"15-Dec", HarvestingDate:"10-Mar"));
            cropsAvailable.Add(new CropsInfo(CropName:"AutumnOats", SowingDate:"01-May", HarvestingDate:"21-Jan"));
            cropsAvailable.Add(new CropsInfo(CropName:"SpringOats", SowingDate:"10-Sep", HarvestingDate:"01-Mar"));
            cropsAvailable.Add(new CropsInfo(CropName:"AutumnOatsChop", SowingDate:"15-Mar", HarvestingDate:"11-Aug"));
            cropsAvailable.Add(new CropsInfo(CropName:"SpringOatsChop", SowingDate:"10-Sep", HarvestingDate:"11-Dec"));
            cropsAvailable.Add(new CropsInfo(CropName:"SummerOatsChop", SowingDate:"15-Oct", HarvestingDate:"05-Mar"));
            cropsAvailable.Add(new CropsInfo(CropName:"FodderBeetLiftedEarly", SowingDate:"15-Oct", HarvestingDate:"05-Sep"));
            cropsAvailable.Add(new CropsInfo(CropName:"FodderBeetLiftedLate", SowingDate:"15-Oct", HarvestingDate:"05-Oct"));
            cropsAvailable.Add(new CropsInfo(CropName:"FieldPea", SowingDate:"15-Oct", HarvestingDate:"26-Feb"));
            pastureSowingDates.Add("spring","01-Dec");
            pastureSowingDates.Add("autumn","15-Mar");
            pastureKillOffDates.Add("spring","01-Sep");
            pastureKillOffDates.Add("summer","15-Feb");

        	// aux variables
        	DateTime date1 = Clock.StartDate;
        	DateTime date2;
        	DateTime date3;
        	int daysNotInPasture = 0;

        	// gather the index of each crop in the rotation (match given crops with availableCrops)
            croppingLength = CropList.Length;
        	for (int i = 0; i < croppingLength; i++)
        	{
        		bool foundCrop = false;
        		foreach (CropsInfo cropAvailable in cropsAvailable)
        		{
	        		if (CropList[i].ToLower() == cropAvailable.CropName.ToLower())
	        		{
	        			cropsInRotation.Add(cropAvailable);
	        			CropList[i] = cropAvailable.CropName;
	        			foundCrop = true;
	        			break;
	        		}
        		}

        		if (!foundCrop)
        		{
        			mySummary.WriteWarning(this, " The crop \'" + CropList[i] + "\' is not available in the parameters list. It will be ignored.");
        			CropList[i] += "(skipped)";
        		}
        	}

        	// check the length of the rotation, count the number of days not in pasture
        	croppingLength = cropsInRotation.Count;
        	// 1. take starting date
            if (RotationHasPasture)
            	date1 = DateTime.Parse(pastureKillOffDates[SeasonToKillPasture.ToLower()] + "-" + Clock.StartDate.Year);
        	else if (cropsInRotation.Count>0)
        		date1 = DateTime.Parse(cropsInRotation[0].SowingDate+ "-" + Clock.StartDate.Year);
        	else
        		mySummary.WriteWarning(this, " The simulation was set up without any crop or pasture!!!");

      		// check whether it is necessary to add a year to start of rotation (to ensure that pasture is killed or crop is sown in the beggining)
      		CurrentRotationYear = 0;
      		if ((YearToKillOffPasture < 2) && (date1 < Clock.StartDate.Date))
      			CurrentRotationYear = -1;

        	// 2. add time leading to and the duration of each crop
        	for (int i = 0; i < croppingLength; i++)
        	{
        		date2 = DateTime.Parse(cropsInRotation[i].SowingDate + "-" + date1.Year);
   				if (date2.Date < date1.Date)
        			date2 = date2.AddYears(1);
    			date3 = date2.AddDays(cropsInRotation[i].CropDuration);
    			daysNotInPasture += (date3 - date1).Days;
    			date1 = date3;
    		}

            // add the days between last crop and the re-sowing of either pasture or first crop
            if (RotationHasPasture)
            	date2 = DateTime.Parse(pastureSowingDates[SeasonToResowPasture.ToLower()] + "-" + date1.Year);
        	else
        		date2 = DateTime.Parse(cropsInRotation[0].SowingDate+ "-" + date1.Year);

        	if (date2 < date1)
	        	date2 = date2.AddYears(1);
        	daysNotInPasture += (date2 - date1).Days;

        	// check that the total rotation length is ok
        	string myMessage = "";
            if (RotationHasPasture)
            { // assume a minimum of 180 days in pasture
	        	if ((RotationLength * 365.25 - daysNotInPasture) < 180)
	        	{
	        		myMessage = "The length of the rotation given was too small to simulate all given crops, the value was increased accordingly";
	        		RotationLength = (int)Math.Ceiling((daysNotInPasture + 180.0)/365.25);
	        	}
	        }
        	else
        		RotationLength = (int)Math.Ceiling(daysNotInPasture/365.25);

	        // initialise some variables
        	CurrentCrop = "None";
        	dateSown = "Never";
        	cropHarvested = "None";
        	dateHarvested = "Never";
            currentYear = Clock.Today.Year;
        	daysAfterSowing = 0;
            if (RotationHasPasture)
            {
            	YearToKillOffPasture = Math.Max(1, YearToKillOffPasture);
            	CurrentRotationYear += Math.Max(1, RotationLength - YearToKillOffPasture + 2);
            	if (CurrentRotationYear > RotationLength)
            		CurrentRotationYear = 1;
            	CurrentCropIndex = -1;
            }
            else
            {
            	YearToKillOffPasture = 0;
            	CurrentRotationYear += 1;
            	CurrentCropIndex = 0;
            }

        	// write initialisation message
        	mySummary.WriteMessage(this," Rotation manager initialised");
        	if (RotationHasPasture)
        		mySummary.WriteMessage(this,"   Rotation consists of pasture and crops, with a rotation cycle of " + RotationLength + " years");
        	else
        		mySummary.WriteMessage(this,"   Rotation consists of only crops, with a rotation cycle of " + RotationLength + " years");
        	mySummary.WriteMessage(this,"   Crops in the rotations are: " + string.Join(", ",CropList));
        	if (myMessage != "")
        		mySummary.WriteWarning(this, myMessage);
        }

        [EventSubscribe("StartOfDay")]
        private void OnStartOfDay(object sender, EventArgs e)
        {
        	// check whether pasture should be fully removed and ended at the start of simulation
        	if(Clock.Today.Date == Clock.StartDate.Date)
        	{
        		if(RotationHasPasture)
        		{ // default crop at the start of any simulation is pasture
	        		CurrentCrop = "Pasture";
	        	}
	        	else
	        	{ // remove all pasture
		            Pasture.Graze(amount: 0.0, type: "SetResidueAmount");
		        	Pasture.EndCrop();
	        	}
	        }

        	// check whether year has changed, update rotation year
        	if(currentYear < Clock.Today.Year)
        	{
        		currentYear += 1;
        		CurrentRotationYear += 1;
        		if(CurrentRotationYear > RotationLength)
        		{ // reset rotation
        			CurrentRotationYear = 1;
        			if(RotationHasPasture)
        				CurrentCropIndex = -1;
        		}
	        }

	        // check whether current crop name should be reset
	        if (daysAfterSowing < 0)
	        {
	        	CurrentCrop = "None";
	        	daysAfterSowing = 0;
	        }
        }

        [EventSubscribe("DoManagement")]
        private void OnDoManagement(object sender, EventArgs e)
        {
        	// check whether a crop has been sown, update days after sowing counter
            if ((CurrentCrop.ToLower() != "none") && (CurrentCropIndex >= 0))
           		daysAfterSowing += 1;

	        if(RotationHasPasture)
	        {
	           	// check whether pasture is to be killed off, then when
		        if(CurrentRotationYear == 1)
		        {
	        		if (DateUtilities.DatesEqual(pastureKillOffDates[SeasonToKillPasture.ToLower()],Clock.Today))
	        			setKillOff("Pasture");
		        }

		        // check whether the pasture is to be re-sown, then when
		        if (CurrentCropIndex == croppingLength)
		        {
	        		if (DateUtilities.DatesEqual(pastureSowingDates[SeasonToResowPasture.ToLower()],Clock.Today))
	        		{
		            	CurrentCrop = "Pasture";
		            	setSowing(CurrentCrop);
	        			CurrentCropIndex = -1;
	        		}
		        }
		    }
	        else 
	        {
	        	// check whether crop rotation should be reset
		        if ((CurrentCropIndex == croppingLength))
		        	CurrentCropIndex = 0;
	        }

        	if ((CurrentCropIndex >= 0) && (CurrentCropIndex < croppingLength))
        	{
	        	// check whether and which crop is to be sown
	            if(DateUtilities.DatesEqual(cropsInRotation[CurrentCropIndex].SowingDate, Clock.Today))
	            {
	            	CurrentCrop = cropsInRotation[CurrentCropIndex].CropName;
	            	setSowing(CurrentCrop);
	           	}

				// check whether and which crop is to be harvested
				if (daysAfterSowing == cropsInRotation[CurrentCropIndex].CropDuration)
	            {
	                cropHarvested = cropsInRotation[CurrentCropIndex].CropName;
	        	    setHarvest(cropHarvested);
	           }
	       }
	       else
	       {} // harvest pasture
        }

        private void setSowing(string cropToSow)
        {
    		dateSown = Clock.Today.ToString("dd-MMM");
    		mySummary.WriteMessage(this,"Setting the sowing of " + cropToSow);
    		// set sowing
    	 	myZone.Set("[CropSowingManager].Script.CropName", cropToSow);
    		myZone.Set("[CropSowingManager].Script.CropSowingDate", dateSown);
    		// set fertiliser
    	 	myZone.Set("[CropsAutomaticFertiliser].Script.CurrentCrop", cropToSow);
    		myZone.Set("[CropsAutomaticFertiliser].Script.CropSowingDate", dateSown);
        }

        private void setHarvest(string cropToHarvest)
        {
    		dateHarvested = Clock.Today.ToString("dd-MMM");
			daysAfterSowing = -1;
			CurrentCropIndex +=1;

    	    mySummary.WriteMessage(this,"Setting the harvest of " + cropToHarvest);
    		// set harvesting
    	    myZone.Set("[CropHarvestManager].Script.CropName", cropToHarvest);
    	    myZone.Set("[CropHarvestManager].Script.CropHarvestDate", dateHarvested);
    		// re-set fertiliser
    	 	myZone.Set("[CropsAutomaticFertiliser].Script.CurrentCrop", "None");
    		myZone.Set("[CropsAutomaticFertiliser].Script.CropSowingDate", "dd-mmm");
        }

        private void setKillOff(string cropToKill)
        {
    	    dateHarvested = Clock.Today.ToString("dd-MMM");
			CurrentCropIndex = 0;
			daysAfterSowing = -1;

			mySummary.WriteMessage(this,"Setting kill off " + cropToKill);
    		// set pasture kill off
    	    myZone.Set("[CropHarvestManager].Script.CropName", cropToKill);
    	    myZone.Set("[CropHarvestManager].Script.CropHarvestDate", dateHarvested);
    		// re-set fertiliser
    	 	myZone.Set("[CropsAutomaticFertiliser].Script.CurrentCrop", "None");
    		myZone.Set("[CropsAutomaticFertiliser].Script.CropSowingDate",  "dd-mmm");
        }

        [Serializable]
        public class CropsInfo
        { //structure to hold basic data for each crop type/crop management
        	public string CropName;
        	public string SowingDate;
        	public string HarvestingDate;
        	public int CropDuration;

        	public CropsInfo(string CropName, string SowingDate, string HarvestingDate)
        	{
        		this.CropName = CropName;
	        	this.SowingDate = SowingDate;
	        	this.HarvestingDate = HarvestingDate;
	        	this.CropDuration = (DateTime.Parse(HarvestingDate) - DateTime.Parse(SowingDate)).Days;
	        	if (this.CropDuration <= 0)
	        		this.CropDuration += 365;
        	}
        }
    }
}
```
        Manager CropSowingManager
          CropName = None
          CropSowingDate = 15-Mar
```csharp
using System;
using Models.Core;
using System.Xml.Serialization;
using APSIM.Shared.Utilities;
using Models.PMF;
        
namespace Models
{
    [Serializable] 
    [System.Xml.Serialization.XmlInclude(typeof(Model))]
    public class Script : Model
    {
        //Links to other Apsim modules
        [Link] private Clock Clock;
        [Link] private Weather Weather;
        [Link] private ISummary mySummary = null;
        [Link] private AgPasture.Sward Pasture;
        [ScopedLinkByName] private Plant Wheat;
        [ScopedLinkByName] private Plant Barley;
        [ScopedLinkByName] private Plant Oats;
        [ScopedLinkByName] private Plant FodderBeet;
        [ScopedLinkByName] private Plant FieldPea;

        //User inputs from properties tab
        [Separator("Basic sowing management - parameters will be overwritten by RotationManager")]
        [Description(" Name of crop to sow: ")]
        public string CropName { get; set; }
        [Description(" Crop sowing date (dd-mmm): ")]
        public string CropSowingDate { get; set; }

        //Internal variables
        private bool cropWasSown;

        [EventSubscribe("Commencing")]
        private void OnSimulationCommencing(object sender, EventArgs e)
        {
        	cropWasSown = false;
        }

        [EventSubscribe("DoManagement")]
        private void OnDoManagement(object sender, EventArgs e)
        {
        	// check whether the name of crop needs to be reset
        	if (cropWasSown)
        	{
            	CropName = "None";
        		cropWasSown = false;
        	}

        	// check whether a crop needs to be sown
			if(DateUtilities.DatesEqual(CropSowingDate,Clock.Today))
			{
				if(CropName.ToLower() == "autumnwheat")
				{
					Wheat.Sow(population:150, cultivar:"Claire", depth:30, rowSpacing:250);
					cropWasSown = true;
				}
				else if(CropName.ToLower() == "springwheat")
				{
					Wheat.Sow(population:200, cultivar:"Claire", depth:30, rowSpacing:250);
					cropWasSown = true;
				}
				else if(CropName.ToLower() == "autumnbarley")
				{
					Barley.Sow(population:250, cultivar:"Tavern", depth:30, rowSpacing:250);
					cropWasSown = true;
				}
				else if(CropName.ToLower() == "springbarley")
				{
					Barley.Sow(population:300, cultivar:"Tavern", depth:30, rowSpacing:250);
					cropWasSown = true;
				}
				else if(CropName.ToLower() == "autumnbarleychop")
				{
					Barley.Sow(population:300, cultivar:"Tavern", depth:30, rowSpacing:250);
					cropWasSown = true;
				}
				else if(CropName.ToLower() == "summerbarleychop")
				{
					Barley.Sow(population:300, cultivar:"Tavern", depth:30, rowSpacing:250);
					cropWasSown = true;
				}
				else if(CropName.ToLower() == "autumnoats")
				{
					Oats.Sow(population:200, cultivar:"Milton", depth:30, rowSpacing:250);
					cropWasSown = true;
				}
				else if(CropName.ToLower() == "springoats")
				{
					Oats.Sow(population:200, cultivar:"Milton", depth:30, rowSpacing:250);
					cropWasSown = true;
				}
				else if(CropName.ToLower() == "autumnoatschop")
				{
					Oats.Sow(population:200, cultivar:"Milton", depth:30, rowSpacing:250);
					cropWasSown = true;
				}
				else if(CropName.ToLower() == "springoatschop")
				{
					Oats.Sow(population:200, cultivar:"Milton", depth:30, rowSpacing:250);
					cropWasSown = true;
				}
				else if(CropName.ToLower() == "summeroatschop")
				{
					Oats.Sow(population:200, cultivar:"Milton", depth:30, rowSpacing:250);
					cropWasSown = true;
				}
				else if(CropName.ToLower().Contains("fodderbeet"))
				{ // this can be "fodderbeetliftedearly" or "fodderbeetliftedelate"
					FodderBeet.Sow(population:9, cultivar:"Rivage", depth:20, rowSpacing:450);
					cropWasSown = true;
				}
				else if(CropName.ToLower() == "fieldpea")
				{
					FieldPea.Sow(population:100, cultivar:"Massey", depth:40, rowSpacing:150);
					cropWasSown = true;
				}
				else if (CropName.ToLower() == "pasture")
				{ // sow AgPasture, with species as defined in 'Sward'
				    Pasture.Sow(population: 0, cultivar: "R", depth: 0, rowSpacing: 0);
					cropWasSown = true;
				}
			}
        }
    }
}
```
        Manager CropHarvestManager
          CropName = None
          CropHarvestDate = 15-Feb
```csharp
using System;
using Models.Core;
using System.Xml.Serialization;
using APSIM.Shared.Utilities;
using Models.PMF;
        
namespace Models
{
    [Serializable] 
    [System.Xml.Serialization.XmlInclude(typeof(Model))]
    public class Script : Model
    {
        //Links to other Apsim modules
        [Link] private Clock Clock;
        [Link] private Zone myZone;
        [Link] private Weather Weather;
        [Link] private ISummary mySummary = null;
        [Link] private Surface.SurfaceOrganicMatter mySurfaceOrganicMatter;
        [Link] private AgPasture.Sward Pasture;
        [ScopedLinkByName] private Plant Wheat;
        [ScopedLinkByName] private Plant Barley;
        [ScopedLinkByName] private Plant Oats;
        [ScopedLinkByName] private Plant FodderBeet;
        [ScopedLinkByName] private Plant FieldPea;

        //User inputs from properties tab
        [Separator("Basic crop harvest management - parameters will be overwritten by RotationManager")]
        [Description(" Name of crop to harvest: ")]
        public string CropName { get; set; }
        [Description(" Crop harvest date (dd-mmm): ")]
        public string CropHarvestDate { get; set; }

        //Manager outputs
        [XmlIgnore][Units("kg/ha")] public double CropYield { get; set; }
        [XmlIgnore][Units("kg/ha")] public double WheatYield { get; set; }
        [XmlIgnore][Units("kg/ha")] public double BarleyYield { get; set; }
        [XmlIgnore][Units("kg/ha")] public double OatsYield { get; set; }
        [XmlIgnore][Units("kg/ha")] public double FodderBeetYield { get; set; }
        [XmlIgnore][Units("kg/ha")] public double FieldPeaYield { get; set; }

        //Internal variables
        private bool cropWasHarvested;

        [EventSubscribe("Commencing")]
        private void OnSimulationCommencing(object sender, EventArgs e)
        {
        	cropWasHarvested = false;
        	CropYield = 0.0;
        	WheatYield = 0.0;
        	BarleyYield = 0.0;
        	OatsYield = 0.0;
        	FodderBeetYield = 0.0;
        	FieldPeaYield = 0.0;
        }

        [EventSubscribe("DoManagement")]
        private void OnDoManagement(object sender, EventArgs e)
        {
        	// check whether the name of crop needs to be reset
        	if (cropWasHarvested)
        	{
            	CropName="None";
        		cropWasHarvested = false;
        		CropYield = 0.0;
	        	WheatYield = 0.0;
	        	BarleyYield = 0.0;
	        	OatsYield = 0.0;
	        	FodderBeetYield = 0.0;
	        	FieldPeaYield = 0.0;
        	}

        	// check whether a crop needs to be harvested
			if(DateUtilities.DatesEqual(CropHarvestDate,Clock.Today))
			{
				if(CropName.ToLower().Contains("wheat"))
				{ // this can be "autumnwheat" or "springwheat"
					CropYield = (double)myZone.Get("[Wheat].Grain.Wt");
					WheatYield = CropYield;
					Wheat.Harvest();
					Wheat.EndCrop();
					mySurfaceOrganicMatter.Incorporate(0.75,0.0);
					cropWasHarvested = true;
				}
				else if(CropName.ToLower().Contains("barley"))
				{// this could be "autumnbarley", "springbarley", "autumnbarleychop" or "summerbarleychop"
					if(CropName.ToLower().Contains("chop"))
					{
						CropYield = (double)myZone.Get("[Barley].AboveGround.Wt");
						Barley.RemoveBiomass("Cut");
						CropYield -= (double)myZone.Get("[Barley].AboveGround.Wt");
					}
					else
					{
						CropYield = (double)myZone.Get("[Barley].Grain.Wt");
						Barley.Harvest();
					}
					BarleyYield = CropYield;
					Barley.EndCrop();
					mySurfaceOrganicMatter.Incorporate(0.75,0.0);
					cropWasHarvested = true;
				}
				else if(CropName.ToLower().Contains("oats"))
				{// this could be "autumnoats", "springoats", "autumnoatschop", "springoatschop" or "summeroatschop"
					if(CropName.ToLower().Contains("chop"))
					{
						CropYield = (double)myZone.Get("[Oats].AboveGround.Wt");
						Oats.RemoveBiomass("Cut");
						CropYield -= (double)myZone.Get("[Oats].AboveGround.Wt");
					}
					else
					{
						CropYield = (double)myZone.Get("[Oats].Grain.Wt");
						Oats.Harvest();
					}
					OatsYield = CropYield;
					Oats.EndCrop();
					mySurfaceOrganicMatter.Incorporate(0.75,0.0);
					cropWasHarvested = true;
				}
				else if(CropName.ToLower().Contains("fodderbeet"))
				{ // this can be "fodderbeetliftedearly" or "fodderbeetliftedlate"
					CropYield = (double)myZone.Get("[FodderBeet].AboveGround.Wt");
					FodderBeet.Harvest();
					CropYield -= (double)myZone.Get("[FodderBeet].AboveGround.Wt");
					FodderBeetYield = CropYield;
					FodderBeet.EndCrop();
					mySurfaceOrganicMatter.Incorporate(0.5,0.0);
					cropWasHarvested = true;
				}
				else if(CropName.ToLower().Contains("fieldpea"))
				{
					CropYield = (double)myZone.Get("[FieldPea].Grain.Wt");
					FieldPeaYield = CropYield;
					FieldPea.Harvest();
					FieldPea.EndCrop();
					mySurfaceOrganicMatter.Incorporate(0.75,0.0);
					cropWasHarvested = true;
				}
				else if(CropName.ToLower() == "pasture")
				{
					Pasture.EndCrop();
					cropWasHarvested = true;
					mySurfaceOrganicMatter.Incorporate(0.5,0.0);
				}
			}
        }
    }
}
```
        Manager PastureHarvestManager
          ControlDefoliationIsEnabled = False
          CutRotationStartDate = 1900-01-01
          CutRotationEndDate = 2100-12-31
          DefoliationTriggerType = TargetStandingBiomass
          CutIntervalValues = 21
          TargetDMValues = 2500,2500,2500,2500,2000,2000,2000,2500,2500,2500,2500,2500,2500
          CutDurationValues = 1
          RemoveAmountType = ResidualDM
          AmountDMValues = 1300,1300,1300,1300,1600,1600,1600,1300,1300,1300,1300,1300,1300
          DMRemoveType = BasedOnDigestibility
          FractionDM2Remove = 0.1
          FractionN2Remove = 0.2
          ReturnType = AsDungUrine
          NDungType = UseGivenProportion
          ProportionN2Dung = 0.4
          CNRatioDung = 0
          UrineDepth = 250
```csharp
using System;
using System.Xml.Serialization;
using System.Linq;
using Models.Core;
using Models.PMF;
using Models.Soils;
using APSIM.Shared.Utilities;
using Models.Interfaces;

namespace Models
{
    [Serializable]
    public class Script : Model
    {
        // - Links to APSIM models
        [Link] Clock Clock;
        [Link] Zone myZone;
        [Link] Fertiliser myFertiliser;
        [Link] Soil mySoil;
        [Link] ISolute NO3;
        [Link] AgPasture.Sward myPasture;
        [Link] ISummary mySummary = null;

        // - Parameters for this manager
        [Separator("Rules for controlling pasture defoliation and residue management")]
        [Description(" Allow this manager to control defoliations? ")]
        public bool ControlDefoliationIsEnabled { get; set; }
        [Description(" Date to begin the rotation: ")]
        public DateTime CutRotationStartDate { get; set; }
        [Description(" Date to finish the rotation: ")]
        public DateTime CutRotationEndDate { get; set; }

        [Separator("Parameters defining how the defoliation is managed")]
        [Description(" How the defoliations should be triggered? ")]
        public DefoliationTriggerTypes DefoliationTriggerType { get; set; }
        [Description("   Minimum number of days between defoliations, used if trigger is an interval: ")]
        public double[] CutIntervalValues { get; set; }
        [Description("   Minimum standing biomass to start defoliations, used if trigger is DM target (kg/ha): ")]
        public double[] TargetDMValues { get; set; }
        [Description(" Duration of each event (days): ")]
        public double[] CutDurationValues { get; set; }
        [Description(" What amount is being defined? ")]
        public removeAmountTypes RemoveAmountType { get; set; }
        [Description(" Amount to use (kg/ha): ")]
        public double[] AmountDMValues { get; set; }

        [Separator("Parameters defining the management of the defoliated biomass")]
        [Description(" How much of harvested DM (and C) is removed from the simulation? ")]
        public removeDMTypes DMRemoveType { get; set; }
        [Description("   Fraction of harvested material to remove, used if UseGivenFraction (0-1):")]
        public double FractionDM2Remove  { get; set; }
        [Description(" Fraction of harvested N that is removed from the simulation (0-1):")]
        public double FractionN2Remove { get; set; }
        [Description(" How the non-removed material is returned to the soil? ")]
        public returnTypes ReturnType { get; set; }

        [Separator("Parameters used when returning material as dung and urine")]
        [Description(" How should the partitioning of N to dung and urine be defined? ")]
        public dungNContentTypes NDungType { get; set; }
        [Description("   Proportion of N returned in dung, used if UseGivenProportion (0-1): ")]
        public double ProportionN2Dung { get; set; }
        [Description("   The C:N of dung, used if UseGivenCNRatio (typically around 20): ")]
        public double CNRatioDung { get; set; }
        [Description(" Depth in the soil down to which urine is applied (mm): ")]
        public double UrineDepth { get; set; }

        // - Outputs from this manager
        [XmlIgnore][Units("kg/ha")]// Description: Pasture DM defoliated today
        public double DefoliatedWt { get; set; }
        [XmlIgnore][Units("kg/ha")]// Description: Pasture N defoliate today
        public double DefoliatedN { get; set; }
        [XmlIgnore][Units("kg/ha")]// Description: Pasture DM harvested today
        public double HarvestedWt { get; set; }
        [XmlIgnore][Units("kg/ha")]// Description: Pasture N harvested today
        public double HarvestedN { get; set; }
        [XmlIgnore][Units("kg/ha")]// Description: Pasture DM removed from the field
        public double RemovedWt { get; set; }
        [XmlIgnore][Units("kg/ha")]// Description: Pasture N removed from the field
        public double RemovedN { get; set; }
        [XmlIgnore][Units("kg/ha")]// Description: Residue DM returned to the field
        public double ReturnedWt { get; set; }
        [XmlIgnore][Units("kg/ha")]// Description: Residue N returned to the field
        public double ReturnedN { get; set; }
        [XmlIgnore][Units("kg/ha")]// Description: Harvested N returned as dung (SurfaceOM)
        public double NReturnedInDung { get; set; }
        [XmlIgnore][Units("kg/ha")]// Description: Harvested N returned as urine (urea)
        public double NReturnedInUrine { get; set; }
        [XmlIgnore][Units("day")]// Description: Number of days after last defoliation
        public int DaysAfterCut { get; set; }
        [XmlIgnore][Units("kg/ha")]// Description: Total standing DM (Leaf + Stem/Sheath) before cut
        public double PreHarvestDM { get; set; }
        [XmlIgnore][Units("kg/ha")]// Description: Total standing DM (Leaf + Stem/Sheath) after cut
        public double PostHarvestDM { get; set; }
        [XmlIgnore][Units("")]// auxiliary flag for defoliation
        public bool aCutHasHappened { get; set; }

        [XmlIgnore][Units("")] public bool HarvestedToday { get; set; } // auxiliary flag for defoliation

        // - Internal variables
        // amount of DM to be used in the defoliation (either residual or amout to remove)
        [XmlIgnore] public double amountGiven { get; set; }
        // amount of standing DM that triggers a defoliation (if using this a trigger)
        [XmlIgnore] public double targetStandingBiomass { get; set; }
        // number of days after a defoliation that trigger a new one (if using this a trigger)
        private int intervalBetweenDefoliations;
        // number of days for each defoliation event
        private int cuttingDuration = 0;
        // counter for day within each defoliation
        private int daysCutting = 0;
        // total existing DM harvestable
        private double existingDM;
        // total herbage to remove in kg/ha per day
        private double herbageToRemove;
        // type of DM amount (ResidualDM or DMToRemove)
        private string amountType;
        // fraction of urine that is applied to each layer
        private double[] fractionUrine;
        // number of layers in the soil
        private int nLayers;

	    // DoY for each value given for target standing DM
	    private int[] daysForTargetDMValues;
	    // DoY for each value given for cut interval
	    private int[] daysForCutIntervalValues;
	    // DoY for each value given for amount to cut or residue
	    private int[] daysForAmountDMValues;
        // DoY for each value given for cut duration
	    private int[] daysForCutDurationValues;

        // - Event to add residue or dung to surface OM
        public event BiomassRemovedDelegate BiomassRemoved;

        [EventSubscribe("Commencing")]
        private void OnSimulationCommencing(object sender, EventArgs e)
        {
        	// get arrays with DoY for each array variable
        	daysForTargetDMValues = setDays(TargetDMValues.Length);
        	daysForCutIntervalValues = setDays(CutIntervalValues.Length);
        	daysForAmountDMValues = setDays(AmountDMValues.Length);
        	daysForCutDurationValues = setDays(CutDurationValues.Length);

            // reset variables
            DaysAfterCut = 0;
            resetVariables();
            targetStandingBiomass = InterpolateValues(Clock.Today.DayOfYear, daysForTargetDMValues, TargetDMValues);
            intervalBetweenDefoliations = (int)InterpolateValues(Clock.Today.DayOfYear, daysForCutIntervalValues, CutIntervalValues);
            amountGiven = InterpolateValues(Clock.Today.DayOfYear, daysForAmountDMValues, AmountDMValues);
            cuttingDuration = (int)InterpolateValues(Clock.Today.DayOfYear, daysForCutDurationValues, CutDurationValues);
            HarvestedToday = false;

            // get the type of amount given
        	if (RemoveAmountType == removeAmountTypes.ResidualDM)
            	amountType = "SetResidueAmount";
            else
            	amountType = "SetRemoveAmount";

            // make sure that rotation start when startDate < simulationStartDay
            if ((Clock.Today > CutRotationStartDate) && (Clock.Today < CutRotationEndDate))
                CutRotationStartDate = Clock.Today;

            // set the fraction of urine for each layer
            nLayers = mySoil.Thickness.Length;
            fractionUrine = new double[nLayers];
            double soilDepth = 0.0;
            double distFactor = 1.5;
            if (ReturnType == returnTypes.AsDungUrine)
            {
                double atZ0;
                double atZ1;
                double totalProp = UrineDepth * Math.Pow(1.0, distFactor) / (distFactor + 1.0);
                
                atZ1 = (UrineDepth - soilDepth) * Math.Pow(1.0 - soilDepth / UrineDepth, distFactor) / (distFactor + 1.0);
                for (int z = 0; z < nLayers; z++)
                {
                    atZ0 = atZ1;
                    soilDepth += mySoil.Thickness[z];
                    atZ1 = (UrineDepth - soilDepth) * Math.Pow(1.0 - soilDepth / UrineDepth, distFactor) / (distFactor + 1);
                    if (1.0 - (soilDepth / UrineDepth) < 0.0)
                        atZ1 = 0;
                    fractionUrine[z] = (atZ0 - atZ1) / totalProp;
                }
            }

            // write summary
            mySummary.WriteMessage(this, "Defoliation manager initialisation:");
            if (ControlDefoliationIsEnabled)
            {
            	mySummary.WriteMessage(this, "  Management valid between " + CutRotationStartDate.ToShortDateString() + " and " + CutRotationEndDate.ToShortDateString());
            	if (DefoliationTriggerType == DefoliationTriggerTypes.TargetStandingBiomass)
            	{
	            	if(TargetDMValues.Length==1)
	            		mySummary.WriteMessage(this, "   Defoliation will happen whenever standing biomass is greater than " + targetStandingBiomass.ToString("#0.0") + " kg/ha.");
	            	else
	            		mySummary.WriteMessage(this, "   Defoliation is triggered by a variable standing biomass (between " + TargetDMValues.Min().ToString("#0.0") + " and " + TargetDMValues.Max().ToString("#0.0") + " kg/ha).");
            	}
            	else
            	{
	            	if(CutIntervalValues.Length==1)
	            		mySummary.WriteMessage(this, "   Defoliation will happen every " + intervalBetweenDefoliations + " days.");
	            	else
	            		mySummary.WriteMessage(this, "   Defoliation interval is variable along the year (between " + CutIntervalValues.Min() + " and " + CutIntervalValues.Max() + " days.");
            	}

            	if (RemoveAmountType == removeAmountTypes.ResidualDM)
	            {
	            	if(AmountDMValues.Length==1)
	            		mySummary.WriteMessage(this, "   Removing all biomass down to a residue of " + amountGiven.ToString("#0.0") + " kg/ha.");
	            	else
	            		mySummary.WriteMessage(this, "   Removing biomass down to a variable residue amount (between " + AmountDMValues.Min().ToString("#0.0") + " and " + AmountDMValues.Max().ToString("#0.0") + " kg/ha).");
	            }
	            else
	            {
	            	if(AmountDMValues.Length==1)
	            		mySummary.WriteMessage(this, "   Removing " + amountGiven.ToString("#0.0") + " kg/ha in every event.");
	            	else
	            		mySummary.WriteMessage(this, "   Removing a variable biomass amount every event (between " + AmountDMValues.Min().ToString("#0.0") + " and " + AmountDMValues.Max().ToString("#0.0") + " kg/ha).");
	            }
	        }
        }
        
        [EventSubscribe("DoManagement")]
        private void OnDoManagement(object sender, EventArgs e)
        {
            // Check whether defoliation is allowed at all
            HarvestedToday = false;
            if (ControlDefoliationIsEnabled)
            {
                if (Clock.Today == CutRotationStartDate)
                    DaysAfterCut = (int)InterpolateValues(Clock.Today.DayOfYear, daysForCutIntervalValues, CutIntervalValues);

                // Check whether we can defoliate
                if ((Clock.Today >= CutRotationStartDate) && (Clock.Today <= CutRotationEndDate)  && myPasture.IsAlive)
                {
                    // Check whether we should start a defoliation
                    if (DefoliationTriggerType == DefoliationTriggerTypes.FixedInterval)
                    {
            			intervalBetweenDefoliations = (int)InterpolateValues(Clock.Today.DayOfYear, daysForCutIntervalValues, CutIntervalValues);
	                    if (DaysAfterCut == (intervalBetweenDefoliations - 1))
	                    {
            				amountGiven = InterpolateValues(Clock.Today.DayOfYear, daysForAmountDMValues, AmountDMValues);
            				cuttingDuration = (int)InterpolateValues(Clock.Today.DayOfYear, daysForCutDurationValues, CutDurationValues);
	                        StartDefoliation(amountGiven, amountType, cuttingDuration);
						}
                    }
                    else if (DefoliationTriggerType == DefoliationTriggerTypes.TargetInterval)
                    {
            			intervalBetweenDefoliations = (int)InterpolateValues(Clock.Today.DayOfYear, daysForCutIntervalValues, CutIntervalValues);
                        if (DaysAfterCut >= intervalBetweenDefoliations)
	                    {
            				amountGiven = InterpolateValues(Clock.Today.DayOfYear, daysForAmountDMValues, AmountDMValues);
            				cuttingDuration = (int)InterpolateValues(Clock.Today.DayOfYear, daysForCutDurationValues, CutDurationValues);
	                        StartDefoliation(amountGiven, amountType, cuttingDuration);
						}
                    }
                    else  //DefoliationTriggerType == DefoliationTriggerTypes.TargetStandingBiomass
                    {
		            	targetStandingBiomass = InterpolateValues(Clock.Today.DayOfYear, daysForTargetDMValues, TargetDMValues);
                    	if (myPasture.StandingHerbageWt >= targetStandingBiomass)
	                    {
            				amountGiven = InterpolateValues(Clock.Today.DayOfYear, daysForAmountDMValues, AmountDMValues);
            				cuttingDuration = (int)InterpolateValues(Clock.Today.DayOfYear, daysForCutDurationValues, CutDurationValues);
	                        StartDefoliation(amountGiven, amountType, cuttingDuration);
						}
                    }
                }
            }
            //// Note: Only the code above should be limited by 'ControlDefoliationIsEnabled'. This way, the rest of the code
            ////  can still be used. This can be done by calling 'StartDefoliation' from another manager or a schedulle thingy.

            // Check whether we need to continue cutting
            if ((daysCutting > 0) && (daysCutting < cuttingDuration))
            {
                // reset outputs
                resetVariables();

                // remove biomass and return residue
                removeDM(herbageToRemove);
                if (ReturnType == returnTypes.AsResidue)
                    returnResidues();
                else
                    returnExcreta();
                daysCutting += 1;
                if (daysCutting == cuttingDuration)
                    PostHarvestDM = myPasture.StandingHerbageWt;
            }

            // reset outputs
            if (daysCutting < 0)
            {
                resetVariables();
                daysCutting = 0;
            }
        }

        [EventSubscribe("DoManagementCalculations")]
        private void OnDoManagementCalculations(object sender, EventArgs e)
        {
            // Check whether a cutting has finished
            if (daysCutting == cuttingDuration)
            {
                aCutHasHappened = true;
                daysCutting = -1;
            }

            // Increase the counter for days after cutting
            if (aCutHasHappened && (daysCutting == 0))
                DaysAfterCut += 1;
        }

        // Resets the values of all outputs
        private void resetVariables()
        {
            DefoliatedWt = 0.0;
            DefoliatedN = 0.0;
            HarvestedWt = 0.0;
            HarvestedN = 0.0;
            RemovedWt = 0.0;
            RemovedN = 0.0;
            ReturnedWt = 0.0;
            ReturnedN = 0.0;
            NReturnedInDung = 0.0;
            NReturnedInUrine = 0.0;
        }

        // Description: Perform the basic calculations to start a defoliation
        public void StartDefoliation(double amountDM, string amountType, int duration)
        {
            // Get the existing plant amount
            PreHarvestDM = myPasture.StandingHerbageWt;
            existingDM = myPasture.HarvestableWt;
            HarvestedToday = true;
            
            // Check the amount to remove and print some info
            if ((amountType == "SetRemoveAmount") && (existingDM >= amountDM / duration))
            {
                mySummary.WriteMessage(this, "   Defoliating " + amountDM.ToString("#0.0") + "kg/ha over " + duration + " days");
                herbageToRemove = amountDM / duration;
            }
            else if ((amountType == "SetResidueAmount") && (existingDM >= amountDM))
            {
                mySummary.WriteMessage(this, "   Defoliating down to approximately " + amountDM.ToString("#0.0") + "kg/ha over " + duration + " days");
                herbageToRemove = (PreHarvestDM - amountDM) / duration;
            }
            else
            {
	            mySummary.WriteMessage(this, "   Defoliation will not happend because there is not enough plant material");
                if (DefoliationTriggerType == DefoliationTriggerTypes.FixedInterval)
                    DaysAfterCut = -duration;
                return;
            }

            cuttingDuration = duration;
            // Perform first defoliation
            removeDM(herbageToRemove);
            if (ReturnType == returnTypes.AsResidue)
                returnResidues();
            else
                returnExcreta();
            daysCutting = 1;
            DaysAfterCut = 0;
            if (daysCutting == cuttingDuration)
                PostHarvestDM = myPasture.StandingHerbageWt;
        }

        // Do the DM removal
        private void removeDM(double removeAmount)
        {
            myPasture.Graze(amount: removeAmount, type: "SetRemoveAmount");
            
            // get total harvested
            DefoliatedWt = myPasture.HarvestedWt;
            DefoliatedN = myPasture.HarvestedN;
            HarvestedWt = DefoliatedWt;
            HarvestedN = DefoliatedN;

            // get amounts actually removed from field and that to be returned (dung/urine)
            if (DMRemoveType == removeDMTypes.RemoveAll)
                FractionDM2Remove = 1.0;
            else if (DMRemoveType == removeDMTypes.RemoveNone)
                FractionDM2Remove = 0.0;
            else if (DMRemoveType == removeDMTypes.BasedOnDigestibility)
                FractionDM2Remove = myPasture.HarvestedDigestibility; 
            // else UseGivenFraction = FractionDM2Remove

            RemovedWt = HarvestedWt * FractionDM2Remove;
            RemovedN = HarvestedN * FractionN2Remove;
            ReturnedWt = HarvestedWt - RemovedWt;
            ReturnedN = HarvestedN - RemovedN;
            
            if (ReturnType == returnTypes.AsDungUrine)
            {
                if (NDungType == dungNContentTypes.UseGivenProportion)
                    NReturnedInDung = ReturnedN * ProportionN2Dung;
                else
                    NReturnedInDung = Math.Min(ReturnedN, ReturnedWt * 0.4 / CNRatioDung);
                NReturnedInUrine = ReturnedN - NReturnedInDung;
            }
            else
            {
                NReturnedInDung = 0.0;
                NReturnedInUrine = 0.0;
            }
        }

        // Return dung and urine
        private void returnExcreta()
        {
            if ((ReturnedWt > 0.0) || (NReturnedInDung > 0.0))
            {
                PMF.BiomassRemovedType BiomassDung = new PMF.BiomassRemovedType();
                string[] type = new string[] { "RuminantDung_PastureFed" };
                float[] dltdm = new float[] { (Single)ReturnedWt };
                float[] dltn = new float[] { (Single)NReturnedInDung };
                float[] dltp = new float[] { 0 };
                float[] fraction = new float[] { 1 };     // fraction is always 1.0 here

                BiomassDung.crop_type = "RuminantDung_PastureFed";
                BiomassDung.dm_type = type;
                BiomassDung.dlt_crop_dm = dltdm;
                BiomassDung.dlt_dm_n = dltn;
                BiomassDung.dlt_dm_p = dltp;
                BiomassDung.fraction_to_residue = fraction;
                BiomassRemoved.Invoke(BiomassDung);
            }

            if (NReturnedInUrine > 0.0)
            {
                double[] myUrineDeposition = new double[nLayers];
                for (int z = 0; z < nLayers; z++)
                    myUrineDeposition[z] = NReturnedInUrine * fractionUrine[z];

                NO3.AddKgHaDelta(SoluteSetterType.Fertiliser, myUrineDeposition);
            }
        }

        // Return pasture residues
        private void returnResidues()
        {
            if ((ReturnedWt > 0.0) || (ReturnedN > 0.0))
            {
                PMF.BiomassRemovedType BiomassDung = new PMF.BiomassRemovedType();
                string[] type = new string[] { "Grass" };
                float[] dltdm = new float[] { (Single)ReturnedWt };
                float[] dltn = new float[] { (Single)ReturnedN };
                float[] dltp = new float[] { 0 };
                float[] fraction = new float[] { 1 };     // fraction is always 1.0 here

                BiomassDung.crop_type = "Grass";
                BiomassDung.dm_type = type;
                BiomassDung.dlt_crop_dm = dltdm;
                BiomassDung.dlt_dm_n = dltn;
                BiomassDung.dlt_dm_p = dltp;
                BiomassDung.fraction_to_residue = fraction;
                BiomassRemoved.Invoke(BiomassDung);
            }
        }

        //Compute the day of year for intervals given by number of dates (array's length)
   		private int[] setDays(int numDates)
   		{
      		//to be used for interpolations of values within the year - first value, day=1; last value day = 365; dates in between are spread evenly (rounded)
      		int[] daysArray;
		    if (numDates < 366)
      		{
      			daysArray = new int[numDates];
      			daysArray[0] = 1;
      			if(numDates>1)
      			{
      				daysArray[numDates-1] = 365;
	      			for (int i = 1; i < numDates - 1; i++)
	      			{
	      				daysArray[i] = 365*i / numDates;
	      			}
	      		}
		    }
      		else
      		{
         		throw new Exception("Number of items on arrays is greater than maximum allowed (365)");
      		}

      		return daysArray;
   		}

   		// compute interpolated values
		private double InterpolateValues(int newX, int[] xArray, double[] yArray)
		{
			//Find out the value of newY corresponding to newX in the 'broken stick' function described by the x and y arrays
			double newY = 0.0;
			int nVals = xArray.Length - 1;
			if (newX <= xArray[0])
			{
			 	//values below x[0] are set to y[0]
			 	newY = yArray[0];
			}
			else if (newX >= xArray[nVals])
			{
			 	//value above x(n) are set to y(n)
			 	newY = yArray[nVals];
			}
			else
			{
				//find the nearest neighbours and interpolate (linear)
				for (int i = 1; i <= nVals; i++)
				{
					if (newX <= xArray[i])
				    {
				    	newY = yArray[i - 1] + ((newX - xArray[i - 1]) * (yArray[i] - yArray[i - 1]) / (xArray[i] - xArray[i - 1]));
				       	i = nVals + 1;
				    }
				}
			}

			return newY;
		}

        // Auxiliary bits and pieces  - - - - - - - - - - - - - - - - - - - - - - - - - - - - - - - - -

        public enum removeAmountTypes
        {
            /// <summary>Setting DM amount to remove</summary>
            DMToRemove,
            /// <summary>Setting residual DM amount</summary>
            ResidualDM
        }

        /// <summary>Flag how defoliations will be triggered</summary>
        public enum DefoliationTriggerTypes
        {
            /// <summary>Setting a fixed interval</summary>
            FixedInterval,
            /// <summary>Setting a target (minimum) inteval</summary>
            TargetInterval,
            /// <summary>Setting a target (maximum) standing biomass</summary>
            TargetStandingBiomass
        }

        public enum removeDMTypes
        {
            /// <summary>Remove all DM</summary>
            RemoveAll,
            /// <summary>Remove no DM</summary>
            RemoveNone,
            /// <summary>Remove a fraction based on digestibility</summary>
            BasedOnDigestibility,
            /// <summary>Remove a user-defined fraction</summary>
            UseGivenFraction
        }

        public enum returnTypes
        {
            /// <summary>Return plant material as residue</summary>
            AsResidue,
            /// <summary>Return meterial as dung and urine</summary>
            AsDungUrine
        }

        public enum dungNContentTypes
        {
            /// <summary>Use a given proportion of N returned as dung</summary>
            UseGivenProportion,
            /// <summary>Use a given C:N of dung</summary>
            UseGivenCNratio,
        }
    }
}
```
        Manager AutomaticIrrigation
          IrrigationManagementIsEnabled = False
          SeasonStart = 15-Oct
          SeasonEnd = 01-May
          SeasonsAllocation = 10000
          TriggerDeficit = 50
          TargetDeficit = 90
          ReturnDays = 0
          MaximumAmount = 25
          DepthOfTopsoil = 500
```csharp
using System;
using System.Xml.Serialization;
using APSIM.Shared.Utilities;
using Models.Core;
using Models.Interfaces;
using Models.Soils;
using Models.PMF;
        
namespace Models
{
    [Serializable] 
    [System.Xml.Serialization.XmlInclude(typeof(Model))]
    public class Script : Model
    {
        //Links to other Apsim modules
        [Link] private Clock Clock;
        [Link] private Irrigation Irrigation;
        [Link] private Soils.Soil mySoil;
        [Link] private ISummary mySummary = null;
        [Link(IsOptional = true)] private IPlant[] cropsInTheSimulation;
       
        //User inputs from properties tab
        [Separator("Generic automatic irrigation management")]
        [Description("Allow this manager to control irrigation? ")]
        public bool IrrigationManagementIsEnabled { get; set; }
        [Description("Start of irrigation season (dd-mmm): ")]
        public string SeasonStart { get; set; }
        [Description("End of irrigation season (dd-mmm): ")]
        public string SeasonEnd { get; set; }
        [Description("Water allocation for a season (mm): ")]
        public double SeasonsAllocation { get; set; }
        [Description("Deficit to trigger irrigation (% PAWC): ")]
        public double TriggerDeficit { get; set; }
        [Description("Deficit to stop irrigaton (% PAWC): ")]
        public double TargetDeficit { get; set; }
        [Description("Minimum days for irrigation to return: ")]
        public double ReturnDays { get; set; }
        [Description("Maximum irrigation application (mm/day): ")]
        public double MaximumAmount { get; set; }
        [Description("Soil depth to calculate PAWC (mm): ")]
        public double DepthOfTopsoil { get; set; }

        //Manager outputs
        [XmlIgnore][Units("mm")] public double TopsoilWaterDeficit { get; set; }
        [XmlIgnore][Units("mm")] public double TopsoilWaterContent { get; set; }
        [XmlIgnore][Units("days")] public double DaysSinceLastIrrigation { get; set; }
        [XmlIgnore][Units("kgN/ha")] public double AmountToApply { get; set; }
        [XmlIgnore][Units("mm")] public double SeasonAppliedAmount { get; set; }
        [XmlIgnore][Units("")] public bool IrrigationTriggered { get; set; }

        //Internal variables
        private bool seasonIsOpen { get; set; }
        private bool cropIsActive { get; set; }
        private bool irrigatorIsAvailable { get; set; }
        private bool soilIsDry { get; set; }
        private double topSoilDUL;
        private double topSoilLL;
        private double[] fracLayer;
    
        //Calculate static Soil variables
        [EventSubscribe("Commencing")]
        private void OnSimulationCommencing(object sender, EventArgs e)
        {   
            //Calculate soil water variables
            topSoilLL = 0.0;
            topSoilDUL = 0.0;
            double depthFromSurface = 0.0;
            int nLayers = mySoil.Thickness.Length;
            for (int layer = 0; layer < nLayers; layer++)
            {
                depthFromSurface += mySoil.Thickness[layer];
            	if (depthFromSurface >= DepthOfTopsoil)
            	{
            		fracLayer = new double[layer + 1];
            		for (int z = 0; z < layer; z++)
            		{
            			fracLayer[z] = 1.0;
			            topSoilLL += mySoil.LL15mm[layer];
		                topSoilDUL += mySoil.DULmm[layer];
		            }

            		fracLayer[layer] = Math.Min(1.0, (DepthOfTopsoil - depthFromSurface + mySoil.Thickness[layer]) / mySoil.Thickness[layer]);
		            topSoilLL += mySoil.LL15mm[layer] * fracLayer[layer];
	                topSoilDUL += mySoil.DULmm[layer] * fracLayer[layer];
                    layer = mySoil.Thickness.Length;
                }
            }

            mySummary.WriteMessage(this," Automatic irrigation manager initialised");
            if(IrrigationManagementIsEnabled)
            {
            	mySummary.WriteMessage(this,"   Irrigation will be applied between " + SeasonStart + " and " + SeasonEnd 
            	+ ", every time the water deficit is greater than " + TriggerDeficit.ToString("#0.0") + " mm");
            }
            else
	            mySummary.WriteMessage(this,"   Irrigation manager is currently disabled");
        }
             
        //Determine daily requirement for irrigation
        [EventSubscribe("DoManagement")]
        private void OnDoManagement(object sender, EventArgs e)
        {
        	// reset some variables
        	IrrigationTriggered = false;
        	AmountToApply = 0.0;

        	// get today's soils water deficit
            TopsoilWaterContent = 0.0;
            for (int layer = 0; layer < fracLayer.Length; layer++)
	            TopsoilWaterContent += mySoil.SoilWater.SWmm[layer] * fracLayer[layer];
            TopsoilWaterDeficit = TopsoilWaterContent - topSoilDUL;

            // evaluate whether a irrigation can be applied
        	if (IrrigationManagementIsEnabled)
        	{
	            // check whether we are within the irrigation season
	            seasonIsOpen = DateUtilities.WithinDates(SeasonStart,Clock.Today,SeasonEnd);

	            // check whether there is a crop in the ground that needs irrigation
	            cropIsActive = false;
	            if (cropsInTheSimulation != null)
	            {
		            foreach(IPlant crop in cropsInTheSimulation)
		            {
		            	if(crop.IsAlive)
		            	{
		            		cropIsActive = true;
		            		break;
		            	}
		            }
		        }
	          
	            // check whether the irrigator is available
	            irrigatorIsAvailable = false;
	            DaysSinceLastIrrigation += 1;
	            if (DaysSinceLastIrrigation >= ReturnDays)
	                irrigatorIsAvailable = true;
	          
	            // check whether the soil is dry enough to require irrigation
	            soilIsDry = false;
	            if (Math.Max(0.0, -TopsoilWaterDeficit) >= (topSoilDUL - topSoilLL) * (100 - TriggerDeficit) / 100)
	                soilIsDry = true;

	            // are all the conditions ratifying irrigation?
	            if (seasonIsOpen && cropIsActive && irrigatorIsAvailable && soilIsDry)
	            {
	                //lets bloody well irrigate then!!!!
	                AmountToApply = Math.Min(MaximumAmount, topSoilDUL * TargetDeficit / 100 - TopsoilWaterContent);
	                AmountToApply = Math.Max(0.0, Math.Min(AmountToApply, SeasonsAllocation - SeasonAppliedAmount));
	                Irrigation.Apply(AmountToApply);
	                DaysSinceLastIrrigation = 0;
	                SeasonAppliedAmount += AmountToApply;
	                IrrigationTriggered = true;
	            }
            }
        }
    }
}
```
        Manager AutomaticFertiliser
          FertiliserManagementIsEnabled = False
          SeasonStart = 15-Aug
          SeasonEnd = 15-May
          DepthOfTopsoil = 600
          CriticalSoilN = 20
          FertNAmount = 20
          FertType = UreaN
          ReturnDays = 15
```csharp
using System;
using Models.Core;
using System.Xml.Serialization;
using APSIM.Shared.Utilities;
using Models.Interfaces;
using Models.Soils;
using Models.PMF;

namespace Models
{
    [Serializable]
    public class Script : Model
    {
        //Links to other Apsim modules
        [Link] private Clock Clock;
        [Link] private Soils.Soil mySoil;
        [ScopedLinkByName] private ISolute NO3;
        [ScopedLinkByName] private ISolute NH4;
        [ScopedLinkByName] private ISolute Urea;
        [Link] private Fertiliser myFertiliser;
        [Link] private ISummary mySummary;

        //User inputs from properties tab
        [Separator("Generic automatic management of N fertiliser")]
        [Description("Allow this manager to control fertiliser applications? ")]
        public bool FertiliserManagementIsEnabled { get; set; }
        [Description("Start of period when fertilise can be applied (dd-mmm): ")]
        public string SeasonStart { get; set; }
        [Description("End of period when fertilise can be applied (dd-mmm): ")]
        public string SeasonEnd { get; set; }
        [Description("Soil depth over which available N is calculated (mm): ")]
        public double DepthOfTopsoil { get; set; }
        [Description("Minimum available N, triggers an application (kgN/ha): ")]
        public double CriticalSoilN { get; set; }
        [Description("Amount of N fertiliser for each application (kgN/ha): ")]
        public double FertNAmount { get; set; }
        [Description("Type of N fertiliser to apply: ")]
        public Fertiliser.Types FertType { get; set; }
        [Description("Minimum period between applications (days): ")]
        public double ReturnDays { get; set; }

        //Manager outputs
        [XmlIgnore][Units("kgN/ha")] public double TopsoilMineralN { get; set; }

        //Internal variables
        private DateTime lastApplicationDate;
        private double[] fracLayer;

        [EventSubscribe("Commencing")]
        private void OnSimulationCommencing(object sender, EventArgs e)
        {
        	// get the number and fraction of layers in the 'top' soil (where mineral N is measured)
            double depthFromSurface = 0.0;
            int nLayers = mySoil.Thickness.Length;
            for (int layer = 0; layer < nLayers; layer++)
            {
                depthFromSurface += mySoil.Thickness[layer];
                if (depthFromSurface >= DepthOfTopsoil)
                { // bottom layer found
                    fracLayer = new double[layer + 1];
                    for (int z = 0; z < layer; z++)
                    	fracLayer[z] = 1.0;
            		fracLayer[layer] = Math.Min(1.0, (DepthOfTopsoil - depthFromSurface + mySoil.Thickness[layer]) / mySoil.Thickness[layer]);
                    layer = mySoil.Thickness.Length;
                }
            }

            mySummary.WriteMessage(this," Automatic crop fertiliser manager initialised");
            if(FertiliserManagementIsEnabled)
            {
	            mySummary.WriteMessage(this,"   Fertiliser will be applied between " + SeasonStart + " and " + SeasonEnd
	            + " every time soil mineral N falls below " + CriticalSoilN.ToString("#0.0") + " kgN/ha");
	        }
            else
	            mySummary.WriteMessage(this,"   Fertiliser manager is currently disabled");
        }

        [EventSubscribe("DoManagement")]
        private void OnDoManagement(object sender, EventArgs e)
        {
            double daysSinceLastApplication = (Clock.Today - lastApplicationDate).TotalDays;
            
            // get the N stored in the mySoil
            TopsoilMineralN = 0.0;
            for (int layer = 0; layer < fracLayer.Length; layer++)
                TopsoilMineralN += (NO3.kgha[layer] + NH4.kgha[layer] + Urea.kgha[layer]) * fracLayer[layer];

            if (FertiliserManagementIsEnabled)
            {
	            if((daysSinceLastApplication >= ReturnDays) && (TopsoilMineralN <= CriticalSoilN))
	            {
	                myFertiliser.Apply(Amount: FertNAmount, Type: FertType);
	                lastApplicationDate = Clock.Today;
	            }
            }
        }
    }
}
```
        Manager CropsAutomaticFertiliser
          FertiliserManagementIsEnabled = True
          CurrentCrop = None
          CropSowingDate = Never
          SoilTestIsEnabled = True
          DepthOfTopsoil = 600
          CriticalSoilN = 35
          MinimumAmountToApply = 20
          ReturnDays = 1
```csharp
using System;
using Models.Core;
using System.Xml.Serialization;
using APSIM.Shared.Utilities;
using Models.Interfaces;
using Models.Soils;
using Models.PMF;

namespace Models
{
    [Serializable]
    public class Script : Model
    {
        //Links to other Apsim modules
        [Link] private Clock Clock;
        [Link] private Soils.Soil mySoil;
        [ScopedLinkByName] private ISolute NO3;
        [ScopedLinkByName] private ISolute NH4;
        [ScopedLinkByName] private ISolute Urea;
        [Link] private Fertiliser myFertiliser;
        [Link] private ISummary mySummary;
        [Link(IsOptional = true)] private IPlant[] cropsInTheSimulation;

        //User inputs from properties tab
        [Separator("Generic automatic management for N fertiliser in crops")]
        [Description("Allow this manager to control fertiliser applications? ")]
        public bool FertiliserManagementIsEnabled { get; set; }
        [Description("Name of current crop: ")]
        public string CurrentCrop { get; set; }
        [Description("Crop sowing date (dd-mmm): ")]
        public string CropSowingDate { get; set; }
        [Description("Use soil test to refine fertiliser management? ")]
        public bool SoilTestIsEnabled { get; set; }

        [Separator("Specific parameters if using soil test")]
        [Description("Soil depth over which available N is calculated (mm): ")]
        public double DepthOfTopsoil { get; set; }
        [Description("Minimum available soil N, triggers an application (kgN/ha): ")]
        public double CriticalSoilN { get; set; }
        [Description("Minimum amount of N fertiliser that can be applied (kgN/ha): ")]
        public double MinimumAmountToApply { get; set; }
        [Description("Minimum period between fertiliser applications (days): ")]
        public double ReturnDays { get; set; }

        //Manager outputs
        [XmlIgnore][Units("kgN/ha")] public double TopsoilMineralN { get; set; }
        [XmlIgnore][Units("kgN/ha")] public double AmountToApply { get; set; }
       
        //Internal variables
        private string cropBeingFertilised;
        private double cropPotentialNUptake;
        private string topDressingStartDate;
        private string topDressingEndDate;
        private string[] topDressingFixedDates;
        private double proportionToApplyAtSowing;
        private double proportionToApplyEachTopDressing;
        private int numberOfApplicationsForTopDressing;
        private double baseAmount;
        private DateTime lastApplicationDate;
        private double daysSinceLastApplication;

        private bool seasonIsOpen { get; set; }
        private bool cropIsActive { get; set; }
        private bool fertilserApplicatorIsAvailable { get; set; }
        private bool soilIsDeficient { get; set; }

        private double[] fracLayer;

        [EventSubscribe("Commencing")]
        private void OnSimulationCommencing(object sender, EventArgs e)
        {
        	// get the number and fraction of layers in the 'top' soil (where mineral N is measured)
            double depthFromSurface = 0.0;
            int nLayers = mySoil.Thickness.Length;
            for (int layer = 0; layer < nLayers; layer++)
            {
                depthFromSurface += mySoil.Thickness[layer];
                if (depthFromSurface >= DepthOfTopsoil)
                { // bottom layer found
                    fracLayer = new double[layer + 1];
                    for (int z = 0; z < layer; z++)
                    	fracLayer[z] = 1.0;
            		fracLayer[layer] = Math.Min(1.0, (DepthOfTopsoil - depthFromSurface + mySoil.Thickness[layer]) / mySoil.Thickness[layer]);
                    layer = mySoil.Thickness.Length;
                }
            }

            cropBeingFertilised = "None";
            CurrentCrop = "Pasture";

            mySummary.WriteMessage(this," Automatic crop fertiliser manager initialised");
            if(FertiliserManagementIsEnabled)
            {
            	if(SoilTestIsEnabled)
            	{
	            	mySummary.WriteMessage(this,"   Fertiliser will be applied within given windows every time soil mineral N falls below " 
	            	+ CriticalSoilN.ToString("#0.0") + " kgN/ha");
	            }
	            else
	            	mySummary.WriteMessage(this,"   Fertiliser will be applied according to schedule rules"); 
            }
            else
	            mySummary.WriteMessage(this,"   Fertiliser manager is currently disabled");
        }

        [EventSubscribe("DoManagement")]
        private void OnDoManagement(object sender, EventArgs e)
        {
            // get the N available in the soil
            TopsoilMineralN = 0.0;
            for (int layer = 0; layer < fracLayer.Length; layer++)
                TopsoilMineralN += (NO3.kgha[layer] + NH4.kgha[layer] + Urea.kgha[layer]) * fracLayer[layer];

        	// check whether a new crop is in the field
        	if (CurrentCrop != cropBeingFertilised)
        	{
        		SetFertiliserManagementParameters(CurrentCrop, CropSowingDate);
        		cropBeingFertilised = CurrentCrop;
        	}

            // evaluate whether fertiliser can be applied
            if (FertiliserManagementIsEnabled && (CurrentCrop != "None") && (cropPotentialNUptake > 0.0))
            {
        		// are we within the fertiliser season?
				seasonIsOpen = false;
        		if (DateUtilities.DatesEqual(CropSowingDate, Clock.Today))
        		{ // get fertiliser to apply on sowing
	            	seasonIsOpen = true;
	            	baseAmount = proportionToApplyAtSowing * cropPotentialNUptake;
	            }
	            else if(numberOfApplicationsForTopDressing > 0)
	            { // get fertiliser to apply as top dressing
	        		if (SoilTestIsEnabled)
	        		{
			            if (cropBeingFertilised == "Pasture")
			            {
				        	foreach (string givenDate in topDressingFixedDates)
				        	{
				        		if (DateUtilities.DatesEqual(givenDate, Clock.Today))
				        		{
					            	baseAmount = proportionToApplyEachTopDressing * cropPotentialNUptake;
					            	seasonIsOpen = true;
					            	break;
					            }
				        	}
			        	}
			        	else
			        	{
				            if(DateUtilities.WithinDates(topDressingStartDate, Clock.Today, topDressingEndDate))
			        		{
				            	seasonIsOpen = true;
				            	baseAmount = proportionToApplyEachTopDressing * cropPotentialNUptake;
				            }
			        	}
			        }
			        else if (numberOfApplicationsForTopDressing > 0)
			        { //scheduled applications
			        	foreach (string givenDate in topDressingFixedDates)
			        	{
			        		if (DateUtilities.DatesEqual(givenDate, Clock.Today))
			        		{
				            	baseAmount = proportionToApplyEachTopDressing * cropPotentialNUptake;
				            	seasonIsOpen = true;
				            	break;
				            }
			        	}
			        }
			    }

	            // is there a crop in the ground that needs fertiliser?
	            cropIsActive = false;
	            if (cropsInTheSimulation != null)
	            {
		            foreach(IPlant crop in cropsInTheSimulation)
		            {
		            	if(crop.IsAlive)
		            	{
		            		cropIsActive = true;
		            		break;
		            	}
		            }
	            }
	          
	            // is the fertiliser applicator available?
	            daysSinceLastApplication = (Clock.Today - lastApplicationDate).TotalDays;
	            fertilserApplicatorIsAvailable = false;
	            if (daysSinceLastApplication >= ReturnDays)
	                fertilserApplicatorIsAvailable = true;

	            // is the soil N low enough to require fertiliser?
	            if (SoilTestIsEnabled)
	            { // attempting to maintain soil N above the critical value
		            soilIsDeficient = false;
		            if (cropBeingFertilised == "Pasture")
		            {
			            if (TopsoilMineralN < 35.0)
			                soilIsDeficient = true;
		            }
		            else
		            {
			            if (TopsoilMineralN < CriticalSoilN)
			                soilIsDeficient = true;
		            }
	            }
	            else
	            	soilIsDeficient = true;

	            // are all the conditions ratifying a fertiliser application?
	            if (seasonIsOpen && cropIsActive && fertilserApplicatorIsAvailable && soilIsDeficient)
	            { // lets apply some N then
	            	if (SoilTestIsEnabled)
	            	{ // amount to lift soil N up to desired level (baseAmount)
	            		AmountToApply = Math.Max(MinimumAmountToApply, baseAmount - TopsoilMineralN);
	            	}
	            	else
	            	{ // amount defined by fixed schedule
	            		AmountToApply = baseAmount;
	            	}

	            	myFertiliser.Apply(Amount: AmountToApply, Type: Fertiliser.Types.UreaN);
	           		lastApplicationDate = Clock.Today;
	            }
            }
        }

        public void SetFertiliserManagementParameters(string currentCrop, string sowingDate)
        {
        	//NOTE: The management rules must be set for each crop separately.
        	//     For most crops fertiliser applicactions are split in two 'windows': at sowing and top dressing.
        	//     Top dressing may be further split, especially for crops with a long growing season.
        	//     The two basic options for managing fertiliser applications are:
        	//      - schedule applications, where dates are pre-defined (equal to sowingDate, plus start and end of top dressing window)
        	//        and the user provides the total N to apply, which is split between dates, according to set proportions;
        	//      - use soil testing, where application time and amounts are calculated based on how much N is in the top soil (only mineral N),
        	//        the amounts to be applied aim to lift soil N to the amounts correspondent to schedule (i.e. adjusted to existing amount);

        	CurrentCrop = currentCrop;
        	CropSowingDate = sowingDate;
            if(CurrentCrop.ToLower() == "autumnwheat")
            {
            	cropPotentialNUptake = 350.0;
    			proportionToApplyAtSowing = 0.2;
    			numberOfApplicationsForTopDressing = 2;
    			topDressingStartDate = "15-Aug";
    			topDressingEndDate = "15-Oct";
    		}
    		else if(CurrentCrop.ToLower() == "springwheat")
            {
            	cropPotentialNUptake = 250.0;
    			proportionToApplyAtSowing = 0.25;
    			numberOfApplicationsForTopDressing = 2;
    			topDressingStartDate = "15-Oct";
    			topDressingEndDate = "15-Nov";
    		}
    		else if(CurrentCrop.ToLower() == "autumnbarley")
            {
            	cropPotentialNUptake = 250.0;
    			proportionToApplyAtSowing = 0.2;
    			numberOfApplicationsForTopDressing = 2;
    			topDressingStartDate = "15-Aug";
    			topDressingEndDate = "30-Sep";
    		}
    		else if(CurrentCrop.ToLower() == "springbarley")
            {
            	cropPotentialNUptake = 200.0;
    			proportionToApplyAtSowing = 0.25;
    			numberOfApplicationsForTopDressing = 2;
    			topDressingStartDate = "10-Oct";
    			topDressingEndDate = "30-Oct";
    		}
			else if(CurrentCrop.ToLower() == "autumnbarleychop")
			{
            	cropPotentialNUptake = 50.0;
    			proportionToApplyAtSowing = 1.0;
    			numberOfApplicationsForTopDressing = 0;
    			topDressingStartDate = "Never";
    			topDressingEndDate = "Never";
			}
			else if(CurrentCrop.ToLower() == "summerbarleychop")
			{
            	cropPotentialNUptake = 50.0;
    			proportionToApplyAtSowing = 1.0;
    			numberOfApplicationsForTopDressing = 0;
    			topDressingStartDate = "Never";
    			topDressingEndDate = "Never";
			}
			else if(CurrentCrop.ToLower() == "autumnoats")
			{
            	cropPotentialNUptake = 100.0;
    			proportionToApplyAtSowing = 0.5;
    			numberOfApplicationsForTopDressing = 1;
    			topDressingStartDate = "05-Sep";
    			topDressingEndDate = "30-Sep";
			}
			else if(CurrentCrop.ToLower() == "springoats")
			{
            	cropPotentialNUptake = 150.0;
    			proportionToApplyAtSowing = 0.33;
    			numberOfApplicationsForTopDressing = 2;
    			topDressingStartDate = "15-Oct";
    			topDressingEndDate = "15-Nov";
			}
			else if(CurrentCrop.ToLower() == "autumnoatschop")
			{
            	cropPotentialNUptake = 0.0;
    			proportionToApplyAtSowing = 1.0;
    			numberOfApplicationsForTopDressing = 0;
    			topDressingStartDate = "Never";
    			topDressingEndDate = "Never";
			}
			else if(CurrentCrop.ToLower() == "springoatschop")
			{
            	cropPotentialNUptake = 0.0;
    			proportionToApplyAtSowing = 0.0;
    			numberOfApplicationsForTopDressing = 0;
    			topDressingStartDate = "Never";
    			topDressingEndDate = "Never";
			}
			else if(CurrentCrop.ToLower() == "summeroatschop")
			{
            	cropPotentialNUptake = 50.0;
    			proportionToApplyAtSowing = 0.0;
    			numberOfApplicationsForTopDressing = 1;
    			topDressingStartDate = "15-Sep";
    			topDressingEndDate = "20-Sep";
			}
			else if(CurrentCrop.ToLower().Contains("fodderbeet"))
			{
            	cropPotentialNUptake = 200.0;
    			proportionToApplyAtSowing = 0.30;
    			numberOfApplicationsForTopDressing = 2;
    			topDressingStartDate = "15-Nov";
    			topDressingEndDate = "15-Jan";
			}
			else if(CurrentCrop.ToLower() == "fieldpea")
			{
            	cropPotentialNUptake = 0.0;
    			proportionToApplyAtSowing = 0.0;
    			numberOfApplicationsForTopDressing = 0;
    			topDressingStartDate = "Never";
    			topDressingEndDate = "Never";
			}
			else if (CurrentCrop.ToLower() == "pasture")
			{
				// to be updated by AgResearch
            	cropPotentialNUptake = 200.0;
    			proportionToApplyAtSowing = 0.0;
    			numberOfApplicationsForTopDressing = 5;
    			topDressingStartDate = "15-Aug";
    			topDressingEndDate = "15-Apr";
    			setUpTopDressingDates(numberOfApplicationsForTopDressing);
			}
			else
    		{
    			CurrentCrop = "None";
    		}

    		// compute proportion to be applied in each top dressing
			if(numberOfApplicationsForTopDressing > 0)
				proportionToApplyEachTopDressing = Math.Max(0.0,(1.0 - proportionToApplyAtSowing)/numberOfApplicationsForTopDressing);
			else
				proportionToApplyEachTopDressing = 0.0;

    		// check whether dates to apply need to be set
			if (!SoilTestIsEnabled && (numberOfApplicationsForTopDressing > 0))
				setUpTopDressingDates(numberOfApplicationsForTopDressing);
        }

        private void setUpTopDressingDates(int numOfApplications)
        {
        	// Set up array with dates for topdressing (to be used when schedulling applications)
        	// assumes that applications are split evenly within the window, according to the number of applications

			topDressingFixedDates = new string[numOfApplications];
			int intervalBetweenApplications = Convert.ToInt32((DateUtilities.GetDate(topDressingEndDate,Clock.Today.Year) - DateUtilities.GetDate(topDressingStartDate,Clock.Today.Year)).TotalDays/numOfApplications);
			if (intervalBetweenApplications<0)
				intervalBetweenApplications += 365;

mySummary.WriteMessage(this,"  intervalBetweenApplications: " + intervalBetweenApplications);

			DateTime auxDate = DateUtilities.GetDate(topDressingStartDate,Clock.Today.Year);
			auxDate = auxDate.AddDays(intervalBetweenApplications/2.0);
			topDressingFixedDates[0] = auxDate.ToString("dd-MMM");
			for (int i=1; i<numOfApplications; i++)
			{
				auxDate = auxDate.AddDays(intervalBetweenApplications);
				topDressingFixedDates[i] = auxDate.ToString("dd-MMM");
			}
        }
    }
}
```
        Manager FertiliseOnFixedDates
          FertiliserManagementIsEnabled = True
          FertiliserManagementIsRestricted = True
          FertiliserDates = 15-Sep,30-Nov,15-Apr
          FertNAmount = 33.33
          FertType = UreaN
```csharp
using System;
using Models.Core;
using Models.PMF;
using APSIM.Shared.Utilities;
namespace Models
{
    [Serializable]
    public class Script : Model
    {
        //Links to other Apsim modules
        [Link] Clock Clock;
        [Link] Fertiliser myFertiliser;
        [Link] private AgPasture.Sward Pasture;
        
        //User inputs from properties tab
        [Separator("Generic management for applying N fertiliser in crops on one or more dates in every year")]
        [Description("Allow this manager to control fertiliser applications? ")]
        public bool FertiliserManagementIsEnabled { get; set; }
        [Description("Restrict fertiliser applications to pasture? ")]
        public bool FertiliserManagementIsRestricted { get; set; }
        [Description("Dates to apply fertiliser (dd-mmm, separated by comma): ")] 
        public string[] FertiliserDates { get; set; } 
        [Description("Amount(s) of fertiliser to be applied (kgN/ha)")]
        public double[] FertNAmount { get; set; }
        [Description("Type of fertiliser to apply? ")]
        public Fertiliser.Types FertType { get; set; }

        //Internal variables
        private int applicationCounter;
        private bool allowFertiliserApplications;

        [EventSubscribe("Commencing")]
        private void OnSimulationCommencing(object sender, EventArgs e)
        {
        	applicationCounter = 0;
        	allowFertiliserApplications = false;
        	if (FertiliserManagementIsEnabled)
        	{
	        	if (FertNAmount.Length > 1)
    	    	{
        			if (FertNAmount.Length < FertiliserDates.Length)
        			{
        				throw new Exception("Fertiliser amounts must be either one value or equal to the number of dates given.");
        			}
        		}
        	}
        }

        [EventSubscribe("DoManagement")]
        private void OnDoManagement(object sender, EventArgs e)
        {
        	if (FertiliserManagementIsEnabled)
        	{
        		if (FertiliserManagementIsRestricted)
        		{ // only fertiliser if pasture is alive
        			if (Pasture.IsAlive)
		        		allowFertiliserApplications = true;
		        	else
		        		allowFertiliserApplications = false;
		        }
		        else
		        {
        			allowFertiliserApplications = true;
				}

				if (allowFertiliserApplications)
				{
		        	foreach (string givenDate in FertiliserDates)
		        	{
		    			if (DateUtilities.DatesEqual(givenDate, Clock.Today))
		        		{
		        			if (FertNAmount.Length > 1)
		        			{
			        			applicationCounter = Array.IndexOf(FertiliserDates, givenDate);
		        			}

		        			myFertiliser.Apply(Amount: FertNAmount[applicationCounter], Type: FertType);
		        		}
		        	}
	        	}
        	}
        }
    }
}
```
        Manager AuxSummary
          resetDate = 15-Mar
          TagOutput = none
```csharp
using Models.Interfaces;
using System.Xml.Serialization;
using APSIM.Shared.Utilities;
using Models.PMF;
using Models.Core;
using System;
using Models.Soils;
using Models.Interfaces;
        
namespace Models
{
    [Serializable] 
    [System.Xml.Serialization.XmlInclude(typeof(Model))]
    public class Script : Model
    {
        [Link] private Zone zone;
        [Link] private Clock Clock;
        [Link] private Weather Weather;
        [Link] private Fertiliser Fert;
        [Link] private Irrigation Irrig;
        [Link] private ISummary summary;
        private int reportingLayer;
        [ScopedLinkByName]
        private ISolute NO3;
        [ScopedLinkByName]
        private ISolute NH4;
        [ScopedLinkByName]
        private ISolute Urea;
        [ScopedLinkByName]
        private SoilNitrogen SoilNitrogen;
        [Link] Soils.Soil Soil;
        [Link] Models.Surface.SurfaceOrganicMatter SurfOM;
        [Link] Soils.SoilWater SoilWater = null;

        [Separator("Auxiliary manager to compute summaries and other bits and pieces")]
        [Description(" Date to reset cumulative values (dd-mmm): ")]
        public string resetDate { get; set; }
        [Description(" A general purpose output tag: ")]
        public string TagOutput { get; set; }

        [XmlIgnore] public double AccumRainfall { get; set; }
        [XmlIgnore] public double AccumIrrigation { get; set; }
        [XmlIgnore] public double AccumDrainage { get; set; }
        [XmlIgnore] public double AccumSurfOMMineralisation { get; set; }
        [XmlIgnore] public double AccumFert { get; set; }
        [XmlIgnore] public double AccumExcreta { get; set; }
        [XmlIgnore] public double AccumTotalSoilOMMineralised { get; set; }
        [XmlIgnore] public double AccumTotalDenitrifiedN { get; set; }
        [XmlIgnore] public double AccumTotalLeachedN { get; set; }
        [XmlIgnore] public double AccumUptakeN { get; set; }

        private double cumRain;
        private double cumIrrig;
        private double cumDrain;
        private double cumSurfOMMiner;
        private double cumSOMMiner;
        private double cumFert;
        private double cumExcreta;
        private double cumLeach;
        private double cumDenit;
        private double cumNup;
       
        private DateTime dateToReset;
        private bool hasReset;

        [EventSubscribe("Commencing")]
        private void OnSimulationCommencing(object sender, EventArgs e)
        {
        	dateToReset = DateTime.Parse(resetDate);
        	hasReset = false;
        }
        
        [EventSubscribe("DoManagement")]
        private void OnDoManagement(object sender, EventArgs e)
        {
        	// reset outputs
        	if (hasReset)
        	{
        		ZeroOutputs();
        		hasReset = false;
        	}

            // reset variables when reset date is reached
            if ((Clock.Today.Month == dateToReset.Month) && (Clock.Today.Day == dateToReset.Day))
            {
                ZeroVars();
                hasReset = true;
            }
        }

        [EventSubscribe("DoManagementCalculations")]
        private void OnDoManagementCalculations(object sender, EventArgs e)
        {
            // summarise a series of variables
            SummariseVars();
        }

        private void ZeroVars()
        {
            // zero accumulating variables
            AccumRainfall = cumRain;
            AccumIrrigation = cumIrrig;
            AccumDrainage = cumDrain;
            AccumSurfOMMineralisation = cumSurfOMMiner;
            AccumTotalSoilOMMineralised = cumSOMMiner;
            AccumFert = cumFert;
            AccumExcreta = cumExcreta;
            AccumTotalDenitrifiedN = cumDenit;
            AccumTotalLeachedN = cumLeach;
            AccumUptakeN = cumNup;

            // get initial values
        	cumRain = 0.0;
        	cumIrrig = 0.0;
        	cumDrain = 0.0;
        	cumSurfOMMiner = 0.0;
        	cumSOMMiner = 0.0;
        	cumFert = 0.0;
        	cumExcreta = 0.0;
        	cumDenit = 0.0;
        	cumLeach = 0.0;
        	cumNup = 0.0;
        }

        private void ZeroOutputs()
        {
            // zero accumulating variables
            AccumRainfall = 0.0;
            AccumIrrigation = 0.0;
            AccumDrainage = 0.0;
            AccumSurfOMMineralisation = 0.0;
            AccumTotalSoilOMMineralised = 0.0;
            AccumFert = 0.0;
            AccumExcreta = 0.0;
            AccumTotalDenitrifiedN = 0.0;
            AccumTotalLeachedN = 0.0;
            AccumUptakeN = 0.0;
        }

        private void SummariseVars()
        {
            // get the water balance components
            cumRain += Weather.Rain;
            cumIrrig += Irrig.IrrigationApplied;
            cumDrain += Soil.SoilWater.Drainage;

            // get the nitrogen balance components
            cumSurfOMMiner += MathUtilities.Sum(SoilNitrogen.dlt_n_min_res);
            cumSOMMiner += MathUtilities.Sum(SoilNitrogen.MineralisedN);
            cumFert += Fert.NitrogenApplied; 
            cumExcreta += (double)zone.Get("[PastureHarvestManager].Script.ReturnedN");
            cumDenit += MathUtilities.Sum(SoilNitrogen.Denitrification);
            cumLeach += Soil.SoilWater.LeachNH4 + Soil.SoilWater.LeachNO3;
            cumNup += ((double)zone.Get("[Sward].Ryegrass.SoilUptakeN") + (double)zone.Get("[Sward].WhiteClover.SoilUptakeN"))
            -((double)zone.Get("[Wheat].Root.NUptake") + (double)zone.Get("[Barley].Root.NUptake") + (double)zone.Get("[Oats].Root.NUptake")
            + (double)zone.Get("[FodderBeet].Root.NUptake") + (double)zone.Get("[FieldPea].Root.NUptake"));
        }
    }
}
```
        Memo Description
          # Description of manager scripts and the logic behind

          Management of crop (and pasture) rotation is primarily done by the *RotationManager* script; this manager control the length and order of crops in the rotation.  The actual operations on the crop and pasture are done by additional scripts, *CropSowingManager* and *CropHarvestManager*.  These scripts can be used on their own, but the idea here is that their parameters are set up by the *RotationManager*.  Irrigation and fertiliser applications are also controlled by specific scripts, responding to the type of rotation or species in the ground, but also having their own parameters.  Basic details and assumption used for each scrript are given below.

          ## RotationManager
          This manager has two primary settings, the first defining whether pasture is part of the rotation or not (if yes, pasture is assumed to be in the field at the start of the simulation); the second setting contains the list of crops that make up the rotation.  These are in fact the combination of crop type and general management (e.g. autumn or spring sowing - refer to the file 'Aparima rotations.xlsx').  Four more parameters can be set and will be used in case pasture is part of the rotation: the number of years for the rotation cycle; the year within the rotation in which the pasture is terminated; the period for killing off the pasture; and the period for re-sowing new pasture after cropping.
           - If pasture is not part of the rotation, it will be killed off at initialisation (this is needed as AgPasture is by default alive at the start of Apsim simulations). In this case, the rotation length is defined by the number of crops listed, their respective duration, and any fallow period between crops;
           - If pasture is part of the rotation, the simulation starts with it already established.  The pasture will be killed off after the number of years from the start of the simulation defined in the UI and at the period given (spring or summer).  The user is expected to check that the year and period to kill off pasture are in conformity with the simulation start date (e.g. if wanting to kill off pasture in the first year, but starting the simulation after the date the termination was meant to happen, will result in an extra year of pasture at the beginning of the simulation.  This is also the case for the choice of killing off period and first crop (e.g. kill the pasture in spring and sowing a crop earlier in spring might mean one year of fallow!).  After all the crops given in the list are simulated, pasture is re-sown in the field, the period for this action can be also defined in the UI (spring or autumn).  The resowing of pasture completes the rotation cycle, which will run to match the number of years given in the rotation length, when the cycle will be re-start.  Note that if the number of crops given and their duration would require a greater time to run them than the rotation length, the rotation length will be automatically increased;
           - Sowing and harvests dates, as well as sowing parameters (e.g. cultivar), are pre-defined for each crop.  Variations are given to cover different sowing times and harvest managements;
           - The years within a rotation are defined as a calender year, thus the first year of simulation will end in 31-Dec regardless of when the simulation started (so it may take only one day to count as the first year, the user must be aware of that when setting up the rotation;

          ## CropSowingManager
          This manager controls the sowing of crops, and re-sown of pasture.  It takes two parameters (species and date), which are meant to be set by the *RotationManager*.

          ## CropHarvestManager
          This manager takes two parameters, species and date, to harvest a crop (and terminate it), or kill of pasture.  The parameters are also set up by the *RotationManager*.

          ## AutomaticFertiliser
          This is a generic manager that adds fertiliser based on the amount of N in the soil.  A window for applications can be defined (e.g. to avoid winter applications), but no test for the presence of plants is made.  Besides the window of application two parameters define when fertiliser is applied, the minimum amount of N in the soil and the depth to which this amount is considered.  Fertiliser will be applied whenever the N amount at the given layer falls below the minimum threshold, provided that the date is within the application window.  This may be further restricted by the minimum number of days between applications.  The amount and type of fertiliser to be applied are also defined in the UI.

          ## CropsAutomaticFertiliser
          This manager attempts to mimic more realistic fertiliser management for cropping systems.  Applications are split into small windows, 'at sowing' and one or more 'top dressings'.  These are thus linked to the crop type being simulated and their expected N off take (which are hard-coded).  The amount of N to apply can be set to a schedulled amount or can be adjusted based on soil testing.  If SoilTest is not enabled, the schedulled amount (a fraction of expecited crop uptake) will be applied at the start day of the each window.  If SoilTest is enabled the manager will test the soil to the depth given and only apply fertiliser if the N amount is below the given threshold, and will apply only the difference between existing N and the amount aimed for.  Depending on the parameters given to define the window and N thresholds, more than one fertiliser application may take place in a given window.  Note that becuase these application are linked to crop type, applications will not happen if there is no crop.  Pasture is not yet included as a valid crop.

          ## AutomaticIrrigation
          This is a generic manager that applies irrigation based on soil moisture status.  The irrigation season is defined by a start and end dates, and withing this window irrigation will be apllied whennever the soil moisture falls below a given threshold, which is the soil water deficit (sw-dul) at a given depth.  Applications can be further delayed by the minimum interval between irrigations and stopped altogether if the allocation for the season is exceeded.  A given irrigation stops when the deficit is smaller than a given threshold, depending on the parameters used this may take more than one day.  The amount applied is defined by the difference between the current deficit and a maximum application rate.

          ## PastureHarvestManager
          This generic manager attempts to defoliate pasture (AgPasture sward) continuously between two given dates (absolute, not window within a year).   Defoliation are triggered either a given intervals or when the standing biomass aboveground reaches a given threshold.  At each event the amount defoliated is defined by either a set amount to remove or the residual biomass, the defoliation can span from one to several days.  The biomass amount defoliated can be fully removed from the field or a fraction of it can be returned.  The amount returned can be defined as residue (grass added to the surface OM) or dung+urine (dung added to surface OM and urea added to the soil).  There are paramters to define the partitioning between dung and urine, and the depth down to which urine is applied.
          // Defoliates AgPasture on a regular rotation or one-off via a schedule
          // currenty defoliates the amount specified by spreading evenly over the specified period

          = = = = = = = = = = = = = = = = = = = = = = = = = = = = = = = = = = = = = = = = = = = = = = = = = = = = = = = = = = = = = = = = = = = = = = = = = = = = = = = = = = = = = = = = = = = = = = = =

          # Notes and reminders

           - Sowing, harvests, and pasture kills, could/should be defined by time windows (each with a start and end date).  In these the action would happen as soon as some criteria are matched (for instance: soil moisture and/or temperature for sowing, crop ripeness and rain for harvest, rain for pasture kill).  And how about level of residues, if there is too much it may not be possible to sow...
           - Fertiliser applications could incorporate factors such as soil moisture too.
           - Tillage, or at least the removal of residues post-harvest may need to be considered.
      MicroClimate: a_interception=0; b_interception=1; c_interception=0; d_interception=0; soil_albedo=0.3; SoilHeatFluxFraction=0.4; NightInterceptionFraction=0.5; ReferenceHeight=2
      Irrigation
      Fertiliser
      SurfaceOrganicMatter: InitialResidueName=oat_stubble; InitialResidueType=oats; InitialResidueMass=1500; InitialStandingFraction=0.5; InitialCPR=0; InitialCNR=20; FractionFaecesAdded=0.5
      Soil: SoilType=Deep Silt Loam - Typic Firm Brown Soil; LocalName=Waikiwi; Site=Woodlands; NearestTown=Invercargill; Region=Southland; State=South Island; Country=New Zealand; Latitude=-48.48; Longitude=0; DataSource=NZ National soils database and S-Map; Comments=Complemented with PTFs (Cichota et al); AirDry=[0.1, 0.23, 0.229, 0.244, 0.271]
        Analysis: PHUnits=Water; BoronUnits=0
          Thickness  Rocks  PH  CEC   ParticleSizeSand  ParticleSizeSilt  ParticleSizeClay
          200        0      6   15.4  7.2               68.8              24
          200        0      6   9.1   6.1               81.9              12
          200        0      6   7.1   8.3               73.7              18
          400        0      6   7.5   4.1               74.9              21
          500        0      6   8.8   4.2               67.8              28
        Water
          Thickness  BD     AirDry  LL15   DUL    SAT    KS
          200        1.129  0.1     0.215  0.497  0.514  603.4
          200        1.289  0.23    0.236  0.437  0.483  426.1
          200        1.462  0.229   0.229  0.411  0.43   64.9
          400        1.418  0.244   0.244  0.426  0.442  43.4
          500        1.336  0.271   0.271  0.465  0.473  14.4
          SoilCrop WheatSoil: LL=[0.215, 0.236, 0.229, 0.244, 0.271]; KL=[0.1, 0.1, 0.08, 0.04, 0.01]; XF=[1, 1, 1, 1, 1]
          SoilCrop BarleySoil: LL=[0.215, 0.236, 0.229, 0.244, 0.271]; KL=[0.1, 0.1, 0.08, 0.04, 0.01]; XF=[1, 1, 1, 1, 1]
          SoilCrop OatsSoil: LL=[0.215, 0.236, 0.229, 0.244, 0.271]; KL=[0.1, 0.1, 0.08, 0.04, 0.01]; XF=[1, 1, 1, 1, 1]
          SoilCrop FodderBeetSoil: LL=[0.215, 0.236, 0.229, 0.244, 0.271]; KL=[0.1, 0.1, 0.08, 0.04, 0.01]; XF=[1, 1, 1, 1, 1]
          SoilCrop FieldPeaSoil: LL=[0.215, 0.236, 0.229, 0.244, 0.271]; KL=[0.1, 0.1, 0.08, 0.04, 0.01]; XF=[1, 1, 1, 1, 1]
          SoilCrop RyegrassSoil: LL=[0.215, 0.236, 0.229, 0.244, 0.271]; KL=[0.1, 0.1, 0.08, 0.04, 0.01]; XF=[1, 1, 1, 1, 1]
          SoilCrop WhiteCloverSoil: LL=[0.215, 0.236, 0.229, 0.244, 0.271]; KL=[0.1, 0.1, 0.08, 0.04, 0.01]; XF=[1, 1, 1, 1, 1]
          SoilCrop ScrumSoil: LL=[0.215, 0.236, 0.229, 0.244, 0.271]; KL=[0.1, 0.1, 0.08, 0.04, 0.01]; XF=[1, 1, 1, 1, 1]
        SoilWater: SummerDate=1-Nov; SummerU=5; SummerCona=3; WinterDate=1-apr; WinterU=2; WinterCona=1; DiffusConst=88; DiffusSlope=35; Salb=0.13; CN2Bare=73; CNRed=20; CNCov=0.8; slope=0; discharge_width=0; catchment_area=0; max_pond=0; ResidueInterception=0
          Thickness  SWCON  KLAT
          200        0.65   0
          200        0.57   0
          200        0.6    0
          400        0.49   0
          500        0.47   0
        SoilNitrogen: fom_types=[default, manure, mucuna, lablab, shemp, stable]; fract_carb=[0.2, 0.3, 0.54, 0.57, 0.45, 0]; fract_cell=[0.7, 0.3, 0.37, 0.37, 0.47, 0.1]; fract_lign=[0.1, 0.4, 0.09, 0.06, 0.08, 0.9]
          SoilNitrogenNO3 NO3
          SoilNitrogenNH4 NH4
          SoilNitrogenUrea Urea
          SoilNitrogenPlantAvailableNO3 PlantAvailableNO3
          SoilNitrogenPlantAvailableNH4 PlantAvailableNH4
        SoilOrganicMatter: RootCN=40; EnrACoeff=7.4; EnrBCoeff=0.2; OCUnits=Total
          Thickness  OC   SoilCN  FBiom  FInert  RootWt
          200        4.1  12.5    0.075  0.585   138.298
          200        1.6  12.5    0.014  0.766   92.7039
          200        0.8  12.5    0.008  0.91    62.1413
          400        0.4  12.5    0.008  0.956   27.9219
          500        0.3  12.5    0.008  0.991   10.2719
        InitialWater Initial water: PercentMethod=1; FractionFull=0.95
        Sample Initial nitrogen: NO3Units=kg/ha; NH4Units=kg/ha; SWUnits=Volumetric; OCUnits=Total; PHUnits=Water
          Thickness  NO3    NH4
          200        11.29  0.2258
          200        6.445  0.2578
          200        2.924  0.2924
          400        4.254  0.5672
          500        3.34   0.668
        CERESSoilTemperature
      Sward: ControlledBySward=0; WaterUptakeSource=soilarbitrator; NUptakeSource=soilarbitrator
        PastureSpecies Ryegrass: MaximumNUptake=10; Albedo=0.26; Gsmax=0.011; R50=200; InitialShootDM=1500; InitialRootDM=450; InitialRootDepth=750; ReferencePhotosyntheticRate=1; LightExtinctionCoefficient=0.5; GrowthTminimum=1; GrowthToptimum=20; GrowthTEffectExponent=1.7; HeatOnsetTemperature=28; HeatFullTemperature=35; HeatRecoverySumDD=30; HeatRecoveryTReference=25; ColdOnsetTemperature=1; ColdFullTemperature=-5; ColdRecoverySumDD=25; MaintenanceRespirationCoefficient=0.03; GrowthRespirationCoefficient=0.25; RespirationTReference=20; RespirationExponent=1.5; NThresholdsForLeaves=[0.04, 0.012, 0.05]; NThresholdsForStems=[0.02, 0.006, 0.025]; NThresholdsForStolons=[0, 0, 0]; NThresholdsForRoots=[0.02, 0.006, 0.025]; DegreesDayForGermination=125; TargetShootRootRatio=4; MaxRootAllocation=0.25; ShootRootGlfFactor=0.5; ReproSeasonReferenceLatitude=41; ReproSeasonTimingCoeff=0.14; ReproSeasonMaxAllocationIncrease=0.5; ReproSeasonAllocationCoeff=0.1; FractionLeafMaximum=0.7; FractionLeafMinimum=0.7; FractionLeafDMThreshold=500; FractionLeafDMFactor=2000; FractionLeafExponent=3; SpecificLeafArea=25; SpecificRootLength=100; ShootMaxEffectOnLAI=1000; MaxStemEffectOnLAI=1; LiveLeavesPerTiller=3; TissueTurnoverRateShoot=0.05; TissueTurnoverRateRoot=0.02; DetachmentRateShoot=0.08; TurnoverTemperatureMin=2; TurnoverTemperatureRef=20; TurnoverTemperatureExponent=1; TurnoverDroughtEffectMax=1; TurnoverDroughtThreshold=0.5; TurnoverDefoliationCoefficient=0.5; TurnoverDefoliationRootEffect=0.1; FractionNLuxuryRemobilisable=[0.1, 0.1, 0.1]; SoilSaturationEffectMax=0.1; MinimumWaterFreePorosity=-1; SoilSaturationRecoveryFactor=0.25; NDillutionCoefficient=0.25; GlfGeneric=1; GlfSoilFertility=1; PlantHeightMinimum=25; PlantHeightMaximum=600; PlantHeightMassForMax=10000; PlantHeightExponent=2.8; RootDepthMinimum=50; RootDepthMaximum=750; RootElongationRate=25; RootDistributionDepthParam=90; RootDistributionExponent=3.2; DigestibilitiesCellWall=[0.6, 0.6, 0.6, 0.2]; MinimumGreenWt=100; PreferenceForGreenOverDead=1; PreferenceForLeafOverStems=1
          zero: SpeciesFamily, PhotosyntheticPathway, UseHeatStressFactor, UseColdStressFactor, ColdRecoveryTReference, UseReproSeasonFactor, FractionToStolon, StolonEffectOnLAI, MinimumNFixation, MaximumNFixation, FractionStolonStanding, WaterAvailableMethod, NitrogenAvailableMethod
          PastureAboveGroundOrgan Leaves
            GenericTissue LeafCohort1
            GenericTissue LeafCohort2
            GenericTissue LeafCohort3
            GenericTissue Dead
          PastureAboveGroundOrgan Stems
            GenericTissue LeafCohort1
            GenericTissue LeafCohort2
            GenericTissue LeafCohort3
            GenericTissue Dead
          PastureAboveGroundOrgan Stolons
            GenericTissue LeafCohort1
            GenericTissue LeafCohort2
            GenericTissue LeafCohort3
            GenericTissue Dead
        PastureSpecies WhiteClover: MaximumNUptake=10; Albedo=0.26; Gsmax=0.011; R50=200; SpeciesFamily=1; PhotosyntheticPathway=0; InitialShootDM=500; InitialRootDM=150; InitialRootDepth=350; ReferencePhotosyntheticRate=1; LightExtinctionCoefficient=0.8; GrowthTminimum=2; GrowthToptimum=22; GrowthTEffectExponent=1.7; UseHeatStressFactor=0; HeatOnsetTemperature=30; HeatFullTemperature=36; HeatRecoverySumDD=20; HeatRecoveryTReference=25; UseColdStressFactor=0; ColdOnsetTemperature=2; ColdFullTemperature=-5; ColdRecoverySumDD=30; ColdRecoveryTReference=0; MaintenanceRespirationCoefficient=0.04; GrowthRespirationCoefficient=0.25; RespirationTReference=20; RespirationExponent=1.5; NThresholdsForLeaves=[0.045, 0.02, 0.055]; NThresholdsForStems=[0.0225, 0.01, 0.0275]; NThresholdsForStolons=[0.0225, 0.01, 0.0275]; NThresholdsForRoots=[0.0225, 0.01, 0.0275]; DegreesDayForGermination=125; TargetShootRootRatio=4; MaxRootAllocation=0.25; ShootRootGlfFactor=0.5; UseReproSeasonFactor=0; ReproSeasonReferenceLatitude=41; ReproSeasonTimingCoeff=0.14; ReproSeasonMaxAllocationIncrease=0.5; ReproSeasonAllocationCoeff=0.1; FractionLeafMaximum=0.56; FractionLeafMinimum=0.28; FractionLeafDMThreshold=500; FractionLeafDMFactor=2000; FractionLeafExponent=3; FractionToStolon=0.2; SpecificLeafArea=30; SpecificRootLength=45; StolonEffectOnLAI=0.3; ShootMaxEffectOnLAI=500; MaxStemEffectOnLAI=0.5; LiveLeavesPerTiller=3; TissueTurnoverRateShoot=0.05; TissueTurnoverRateRoot=0.02; DetachmentRateShoot=0.11; TurnoverTemperatureMin=2; TurnoverTemperatureRef=20; TurnoverTemperatureExponent=1; TurnoverDroughtEffectMax=1; TurnoverDroughtThreshold=0.5; TurnoverDefoliationCoefficient=0.5; TurnoverDefoliationRootEffect=0.1; FractionNLuxuryRemobilisable=[0.1, 0.1, 0.1]; MinimumNFixation=0.2; MaximumNFixation=0.6; SoilSaturationEffectMax=0.1; MinimumWaterFreePorosity=-1; SoilSaturationRecoveryFactor=0.25; NDillutionCoefficient=1; GlfGeneric=1; GlfSoilFertility=1; PlantHeightMinimum=25; PlantHeightMaximum=350; PlantHeightMassForMax=7500; PlantHeightExponent=2.5; RootDepthMinimum=30; RootDepthMaximum=350; RootElongationRate=25; RootDistributionDepthParam=70; RootDistributionExponent=2.5; DigestibilitiesCellWall=[0.6, 0.6, 0.6, 0.2]; MinimumGreenWt=50; FractionStolonStanding=0; PreferenceForGreenOverDead=1; PreferenceForLeafOverStems=1; WaterAvailableMethod=0; NitrogenAvailableMethod=0
          PastureAboveGroundOrgan Leaves
            GenericTissue LeafCohort1
            GenericTissue LeafCohort2
            GenericTissue LeafCohort3
            GenericTissue Dead
          PastureAboveGroundOrgan Stems
            GenericTissue LeafCohort1
            GenericTissue LeafCohort2
            GenericTissue LeafCohort3
            GenericTissue Dead
          PastureAboveGroundOrgan Stolons
            GenericTissue LeafCohort1
            GenericTissue LeafCohort2
            GenericTissue LeafCohort3
            GenericTissue Dead
      Plant Wheat: CropType=Wheat; IsEnding=false; DaysAfterEnding=0
      Plant Barley: CropType=Barley; IsEnding=false; DaysAfterEnding=0
      Plant Oats: CropType=Wheat; IsEnding=false; DaysAfterEnding=0
      Plant FodderBeet: CropType=FodderBeet; IsEnding=false; DaysAfterEnding=0
      Plant FieldPea: CropType=FieldPea; IsEnding=false; DaysAfterEnding=0
      Report: EventNames=[Clock].EndOfDay
        VariableNames:
          [Clock].Today
          [Clock].Today as Date
          [Weather].Latitude as Latitude
          [Weather].Longitude as Longitude
          [AuxSummary].Script.TagOutput as LocationID
          [Soil].Name as SoilName
          [RotationManager].Script.CurrentCrop as CurrentCrop
          [CropSowingManager].Script.CropName as SownCrop
          [CropHarvestManager].Script.CropName as HarvestedCrop
          ([CropHarvestManager].Script.CropYield + [PastureHarvestManager].Script.RemovedWt) as CropYield
          [Weather].Rain as Rainfall
          [Irrigation].IrrigationApplied as IrrigationApplied
          [Soil].SoilWater.Es as Evaporation
          (sum([Sward].Ryegrass.WaterUptake) + sum([Sward].WhiteClover.WaterUptake) + [Wheat].Leaf.WaterAllocation + [Barley].Leaf.WaterAllocation + [Oats].Leaf.WaterAllocation + [FodderBeet].Leaf.WaterAllocation  + [FieldPea].Leaf.WaterAllocation) as WaterUptake
          [Soil].SoilWater.Runoff as Runoff
          [Soil].SoilWater.Drainage as Drainage
          sum([Soil].SoilWater.SWmm) as SoilWaterTotal
          sum([Soil].DULmm) as SoilDULTotal
          [Fertiliser].NitrogenApplied as FertiliserNApplied
          (sum([Soil].SoilNitrogen.dlt_n_min_res)+ sum([Soil].SoilNitrogen.MineralisedN)) as TotalNetMineralisedN
          sum([Soil].SoilNitrogen.dlt_n_min_res) as SurfOMMineralisedN
          sum([Soil].SoilNitrogen.MineralisedN) as SoilOMMineralisedN
          sum([Soil].SoilNitrogen.Denitrification) as TotalDenitrifiedN
          [Soil].SoilWater.LeachNO3 as TotalLeachedN
          ([Sward].Ryegrass.SoilUptakeN + [Sward].WhiteClover.SoilUptakeN - [Wheat].Root.NUptake - [Barley].Root.NUptake - [Oats].Root.NUptake - [FodderBeet].Root.NUptake - [FieldPea].Root.NUptake) as NitrogenUptake
          sum([Soil].SoilNitrogen.Urea.kgha) as SoilUreaTotal
          sum([Soil].SoilNitrogen.NH4.kgha) as SoilNH4Total
          sum([Soil].SoilNitrogen.NO3.kgha) as SoilNO3Total
          [SurfaceOrganicMatter].N as SurfOMNTotal
          sum([Soil].SoilNitrogen.FOMN) as SoilFOMNTotal
          sum([Soil].SoilNitrogen.MicrobialN) as SoilMicrobialNTotal
          sum([Soil].SoilNitrogen.HumicN) as SoilHumicNTotal
          [CropsAutomaticFertiliser].Script.TopSoilMineralN as TopSoilMineralN
          [PastureHarvestManager].Script.NReturnedInUrine as UrineDepositedN
          [PastureHarvestManager].Script.NReturnedInDung as DungDepositedN
          [PastureHarvestManager].Script.ReturnedWt as DungDepositedWt
          [PastureHarvestManager].Script.ReturnedN as ExcretaDepositedN
          [Sward].AboveGroundWt as Pasture.AboveGroundWt
          [Sward].BelowGroundWt as Pasture.BelowGroundWt
          [Sward].HarvestedWt as Pasture.Biomass.HarvestedWt
          [Sward].AboveGroundN as Pasture.AboveGroundN
          [Sward].BelowGroundN as Pasture.BelowGroundN
          [Sward].HarvestedN as Pasture.HarvestedN
          [Sward].LAIGreen as Pasture.LAIGreen
          [PastureHarvestManager].Script.RemovedWt as Pasture.Yield
          [Sward].WhiteClover.AboveGroundLiveWt/([Sward].AboveGroundLiveWt+0.000001) as CloverContent
          [Wheat].Grain.Wt*10 as Wheat.GrainWt
          [Wheat].AboveGround.Wt*10 as Wheat.AboveGroundWt
          [Wheat].BelowGround.Wt*10 as Wheat.BelowGroundWt
          [Wheat].AboveGround.N*10 as Wheat.AboveGroundN
          [Wheat].BelowGround.N*10 as Wheat.BelowGroundN
          ([Wheat].Leaf.Removed.Wt +[Wheat].Stem.Removed.Wt + [Wheat].Spike.Removed.Wt + [Wheat].Grain.Removed.Wt)*10 as Wheat.Biomass.HarvestedWt
          ([Wheat].Leaf.Removed.N + [Wheat].Stem.Removed.N + [Wheat].Spike.Removed.N + [Wheat].Grain.Removed.N)*10 as Wheat.Biomass.HarvestedN
          [Wheat].Leaf.LAI as Wheat.LAIGreen
          [CropHarvestManager].Script.WheatYield as Wheat.Yield
          [Barley].Grain.Wt*10 as Barley.GrainWt
          [Barley].AboveGround.Wt*10 as Barley.AboveGroundWt
          [Barley].BelowGround.Wt*10 as Barley.BelowGroundWt
          [Barley].AboveGround.N*10 as Barley.AboveGroundN
          [Barley].BelowGround.N*10 as Barley.BelowGroundN
          ([Barley].Leaf.Removed.Wt + [Barley].Stem.Removed.Wt + [Barley].Spike.Removed.Wt + [Barley].Grain.Removed.Wt)*10 as Barley.Biomass.HarvestedWt
          ([Barley].Leaf.Removed.N + [Barley].Stem.Removed.N + [Barley].Spike.Removed.N + [Barley].Grain.Removed.N)*10 as Barley.Biomass.HarvestedN
          [Barley].Leaf.LAI as Barley.LAIGreen
          [CropHarvestManager].Script.BarleyYield as Barley.Yield
          [Oats].Grain.Wt*10 as Oats.GrainWt
          [Oats].AboveGround.Wt*10 as Oats.AboveGroundWt
          [Oats].BelowGround.Wt*10 as Oats.BelowGroundWt
          [Oats].AboveGround.N*10 as Oats.AboveGroundN
          [Oats].BelowGround.N*10 as Oats.BelowGroundN
          ([Oats].Leaf.Removed.Wt + [Oats].Stem.Removed.Wt + [Oats].Panicle.Removed.Wt + [Oats].Grain.Removed.Wt)*10 as Oats.Biomass.HarvestedWt
          ([Oats].Leaf.Removed.N + [Oats].Stem.Removed.N + [Oats].Panicle.Removed.N + [Oats].Grain.Removed.N)*10 as Oats.Biomass.HarvestedN
          [Oats].Leaf.LAI as Oats.LAIGreen
          [CropHarvestManager].Script.OatsYield as Oats.Yield
          [FodderBeet].AboveGround.Wt*10 as FodderBeet.AboveGroundWt
          [FodderBeet].BelowGround.Wt*10 as FodderBeet.BelowGroundWt
          [FodderBeet].AboveGround.N*10 as FodderBeet.AboveGroundN
          [FodderBeet].BelowGround.N*10 as FodderBeet.BelowGroundN
          ([FodderBeet].Leaf.Removed.Wt + [FodderBeet].Petiole.Removed.Wt + [FodderBeet].StorageRoot.Removed.Wt)*10 as FodderBeet.Biomass.HarvestedWt
          ([FodderBeet].Leaf.Removed.N + [FodderBeet].Petiole.Removed.N + [FodderBeet].StorageRoot.Removed.N)*10 as FodderBeet.Biomass.HarvestedN
          [FodderBeet].Leaf.LAI as FodderBeet.LAIGreen
          [CropHarvestManager].Script.FodderBeetYield as FodderBeet.Yield
          [FieldPea].Grain.Wt*10 as FieldPea.GrainWt
          [FieldPea].AboveGround.Wt*10 as FieldPea.AboveGroundWt
          [FieldPea].BelowGround.Wt*10 as FieldPea.BelowGroundWt
          [FieldPea].AboveGround.N*10 as FieldPea.AboveGroundN
          [FieldPea].BelowGround.N*10 as FieldPea.BelowGroundN
          ([FieldPea].Leaf.Removed.Wt + [FieldPea].Stem.Removed.Wt + [FieldPea].Shell.Removed.Wt + [FieldPea].Grain.Removed.Wt + [FieldPea].Nodule.Removed.Wt + [FieldPea].Root.Removed.Wt)*10 as FieldPea.Biomass.HarvestedWt
          ([FieldPea].Leaf.Removed.N + [FieldPea].Stem.Removed.N + [FieldPea].Shell.Removed.N + [FieldPea].Grain.Removed.N + [FieldPea].Nodule.Removed.N + [FieldPea].Root.Removed.N)*10 as FieldPea.Biomass.HarvestedN
          [FieldPea].Leaf.LAI as FieldPea.LAIGreen
          [CropHarvestManager].Script.FieldPeaYield as FieldPea.Yield
          [Wheat].Leaf.Fw
          [Wheat].Leaf.Fn
          [Barley].Leaf.Fw
          [Barley].Leaf.Fn
          [Oats].Leaf.Fw
          [Oats].Leaf.Fn
          [FodderBeet].Leaf.Fw
          [FodderBeet].Leaf.Fn
          [FieldPea].Leaf.Fw
          [FieldPea].Leaf.Fn
          ([Sward].GlfWaterLogging*[Sward].GlfWaterSupply) as Pasture.Fw
          ([Sward].GlfNContent*[Sward].GlfNSupply) as Pasture.Fn
          [SurfaceOrganicMatter].Wt as ResidueAmount
          [SurfaceOrganicMatter].Cover as ResidueCover
          [AuxSummary].Script.AccumRainfall as CumulativeRain
          [AuxSummary].Script.AccumIrrigation as CumulativeIrrigation
          [AuxSummary].Script.AccumDrainage as CumulativeDrainage
          [AuxSummary].Script.AccumFert as CumulativeFertiliser
          [AuxSummary].Script.AccumExcreta as CumulativeExcreta
          ([AuxSummary].Script.AccumSurfOMMineralisation + [AuxSummary].Script.AccumTotalSoilOMMineralised) as CumulativeMineralisedN
          [AuxSummary].Script.AccumTotalDenitrifiedN as CumulativeDenitrifiedN
          ([AuxSummary].Script.AccumTotalLeachedN as CumulativeLeachedN
          ([AuxSummary].Script.AccumUptakeN as CumulativeNUptake
      Report ReportIOM: EventNames=[Clock].EndOfDay
        VariableNames:
          [Clock].Today as Date
          [Weather].Latitude as Latitude
          [Weather].Longitude as Longitude
          [AuxSummary].Script.TagOutput as LocationID
          [Soil].Name as SoilName
          [RotationManager].Script.CurrentCrop as CurrentCrop
          ([CropHarvestManager].Script.CropYield + [PastureHarvestManager].Script.RemovedWt) as CropYield
          [Soil].SoilWater.Runoff as Runoff
          [Soil].SoilWater.Drainage as Drainage
          sum([Soil].SoilNitrogen.Denitrification) as TotalDenitrifiedN
          [Soil].SoilWater.LeachNO3 as TotalLeachedN
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